<neuroml xmlns="http://www.neuroml.org/schema/neuroml2"  xmlns:xs="http://www.w3.org/2001/XMLSchema" xmlns:xsi="http://www.w3.org/2001/XMLSchema-instance" xsi:schemaLocation="http://www.neuroml.org/schema/neuroml2 https://raw.github.com/NeuroML/NeuroML2/development/Schemas/NeuroML2/NeuroML_v2beta4.xsd" id="Channelpedia_ABasic_13">
    <ionChannelHH id="Channelpedia_ABasic_13" conductance="10pS" species="UA">
        <notes>This is an automated conversion to NeuroML 2 of an ion channel model from Channelpedia.
The original channel model file can be found at: http://channelpedia.epfl.ch/ionchannels/211

Conversion scripts at https://github.com/OpenSourceBrain/BlueBrainProjectShowcase</notes>

        <annotation>
            <rdf:RDF xmlns:rdf="http://www.w3.org/1999/02/22-rdf-syntax-ns#" xmlns:bqmodel="http://biomodels.net/model-qualifiers/" xmlns:bqbiol="http://biomodels.net/biology-qualifiers/">
                <!-- Automatic conversion of Channelpedia XML file to NeuroML2
Uses: https://github.com/OpenSourceBrain/BlueBrainProjectShowcase/blob/master/Channelpedia/ChannelpediaToNeuroML2.py -->
                <rdf:Description rdf:about="Channelpedia_ABasic_13">
                    <bqmodel:isDerivedFrom>
                        <rdf:Bag>
                            <!-- Channelpedia channel ID: 211, ModelID: 13; direct link to original XML model -->
                            <rdf:li rdf:resource="http://channelpedia.epfl.ch/ionchannels/211/hhmodels/13.xml"/>
                        </rdf:Bag>
                    </bqmodel:isDerivedFrom>
                    <bqmodel:isDescribedBy>
                        <rdf:Bag>
                            <!-- Channelpedia channel ID: 211; link to main page for channel -->
                            <rdf:li rdf:resource="http://channelpedia.epfl.ch/ionchannels/211"/>
                        </rdf:Bag>
                    </bqmodel:isDescribedBy>
                    <bqmodel:isDescribedBy>
                        <rdf:Bag>
                            <!-- PubMed ID: 5575343 is referenced in original XML
                                 Prediction of repetitive firing behaviour from voltage clamp data on an isolated neurone soma. J. Physiol. (Lond.), 1971, 213, 31-53 -->
                            <rdf:li rdf:resource="http://identifiers.org/pubmed/5575343"/>
                        </rdf:Bag>
                    </bqmodel:isDescribedBy>
                    <bqbiol:hasTaxon>
                        <rdf:Bag>
                            <!-- Known species: crab; taxonomy id: 6752 -->
                            <rdf:li rdf:resource="http://identifiers.org/taxonomy/6752"/>
                        </rdf:Bag>
                    </bqbiol:hasTaxon>
                </rdf:Description>
            </rdf:RDF>
        </annotation>

        <gate id="m" instances="3" type="gateHHtauInf">
            <timeCourse type="Channelpedia_ABasic_13_m_tau"/>
            <steadyState type="Channelpedia_ABasic_13_m_inf"/>
        </gate>
        <gate id="h" instances="1" type="gateHHtauInf">
            <timeCourse type="Channelpedia_ABasic_13_h_tau"/>
            <steadyState type="Channelpedia_ABasic_13_h_inf"/>
        </gate>
    </ionChannelHH>

    <ComponentType name="Channelpedia_ABasic_13_h_inf" extends="baseVoltageDepVariable">
        <Constant name = "TIME_SCALE" value = "1 ms" dimension = "time"/>
        <Constant name = "VOLT_SCALE" value = "1 mV" dimension = "voltage"/>
        <Dynamics>
            <DerivedVariable name="x" dimension="none" exposure="x" value="(1/(1+exp((V+53.3)/14.54))^4)"/>
            <DerivedVariable name="V" dimension="none" value="v / VOLT_SCALE"/>
        </Dynamics>
    </ComponentType>

    <ComponentType name="Channelpedia_ABasic_13_m_inf" extends="baseVoltageDepVariable">
        <Constant name = "TIME_SCALE" value = "1 ms" dimension = "time"/>
        <Constant name = "VOLT_SCALE" value = "1 mV" dimension = "voltage"/>
        <Dynamics>
            <DerivedVariable name="x" dimension="none" exposure="x" value="(0.0761*(exp((V+94.22)/31.84))/(1+exp((V+1.17)/28.93)))^(1/3)"/>
            <DerivedVariable name="V" dimension="none" value="v / VOLT_SCALE"/>
        </Dynamics>
    </ComponentType>

    <ComponentType name="Channelpedia_ABasic_13_m_tau" extends="baseVoltageDepTime">
        <Constant name = "TIME_SCALE" value = "1 ms" dimension = "time"/>
        <Constant name = "VOLT_SCALE" value = "1 mV" dimension = "voltage"/>
        <Dynamics>
            <DerivedVariable name="t" dimension="none" exposure="t" value="((0.3632+(1.158/(1+exp((V+55.96)/20.12))))) * TIME_SCALE"/>
            <DerivedVariable name="V" dimension="none" value="v / VOLT_SCALE"/>
        </Dynamics>
    </ComponentType>

    <ComponentType name="Channelpedia_ABasic_13_h_tau" extends="baseVoltageDepTime">
        <Constant name = "TIME_SCALE" value = "1 ms" dimension = "time"/>
        <Constant name = "VOLT_SCALE" value = "1 mV" dimension = "voltage"/>
        <Dynamics>
            <DerivedVariable name="t" dimension="none" exposure="t" value="((1.24 + 2.678/(1+exp((V+50)/16.027)))) * TIME_SCALE"/>
            <DerivedVariable name="V" dimension="none" value="v / VOLT_SCALE"/>
        </Dynamics>
    </ComponentType>

</neuroml>
