<neuroml xmlns="http://www.neuroml.org/schema/neuroml2"  xmlns:xs="http://www.w3.org/2001/XMLSchema" xmlns:xsi="http://www.w3.org/2001/XMLSchema-instance" xsi:schemaLocation="http://www.neuroml.org/schema/neuroml2 https://raw.github.com/NeuroML/NeuroML2/development/Schemas/NeuroML2/NeuroML_v2beta4.xsd" id="Channelpedia_Ca_LVAs_4">
    <ionChannelHH id="Channelpedia_Ca_LVAs_4" conductance="10pS" species="Ca">
        <notes>This is an automated conversion to NeuroML 2 of an ion channel model from Channelpedia.
The original channel model file can be found at: http://channelpedia.epfl.ch/ionchannels/212

Conversion scripts at https://github.com/OpenSourceBrain/BlueBrainProjectShowcase</notes>

        <annotation>
            <rdf:RDF xmlns:rdf="http://www.w3.org/1999/02/22-rdf-syntax-ns#" xmlns:bqmodel="http://biomodels.net/model-qualifiers/" xmlns:bqbiol="http://biomodels.net/biology-qualifiers/">
                <!-- Automatic conversion of Channelpedia XML file to NeuroML2
Uses: https://github.com/OpenSourceBrain/BlueBrainProjectShowcase/blob/master/Channelpedia/ChannelpediaToNeuroML2.py -->
                <rdf:Description rdf:about="Channelpedia_Ca_LVAs_4">
                    <bqmodel:isDerivedFrom>
                        <rdf:Bag>
                            <!-- Channelpedia channel ID: 212, ModelID: 4; direct link to original XML model -->
                            <rdf:li rdf:resource="http://channelpedia.epfl.ch/ionchannels/212/hhmodels/4.xml"/>
                        </rdf:Bag>
                    </bqmodel:isDerivedFrom>
                    <bqmodel:isDescribedBy>
                        <rdf:Bag>
                            <!-- Channelpedia channel ID: 212; link to main page for channel -->
                            <rdf:li rdf:resource="http://channelpedia.epfl.ch/ionchannels/212"/>
                        </rdf:Bag>
                    </bqmodel:isDescribedBy>
                    <bqmodel:isDescribedBy>
                        <rdf:Bag>
                            <!-- PubMed ID: 10792440 is referenced in original XML
                                 Characterization of calcium currents in functionally mature mouse spinal motoneurons. Eur. J. Neurosci., 2000, 12, 1624-34 -->
                            <rdf:li rdf:resource="http://identifiers.org/pubmed/10792440"/>
                        </rdf:Bag>
                    </bqmodel:isDescribedBy>
                    <bqbiol:hasTaxon>
                        <rdf:Bag>
                            <!-- Known species: rat; taxonomy id: 10116 -->
                            <rdf:li rdf:resource="http://identifiers.org/taxonomy/10116"/>
                        </rdf:Bag>
                    </bqbiol:hasTaxon>
                </rdf:Description>
            </rdf:RDF>
        </annotation>

        <gate id="m" instances="2" type="gateHHtauInf">
            <timeCourse type="Channelpedia_Ca_LVAs_4_m_tau"/>
            <steadyState type="Channelpedia_Ca_LVAs_4_m_inf"/>
        </gate>
        <gate id="h" instances="1" type="gateHHtauInf">
            <timeCourse type="Channelpedia_Ca_LVAs_4_h_tau"/>
            <steadyState type="Channelpedia_Ca_LVAs_4_h_inf"/>
        </gate>
    </ionChannelHH>

    <ComponentType name="Channelpedia_Ca_LVAs_4_m_tau" extends="baseVoltageDepTime">
        <Constant name = "TIME_SCALE" value = "1 ms" dimension = "time"/>
        <Constant name = "VOLT_SCALE" value = "1 mV" dimension = "voltage"/>
        <Dynamics>
            <DerivedVariable name="t" dimension="none" exposure="t" value="(5.0000 + 20.0000/(1+exp(((V-10)+25.000)/5))) * TIME_SCALE"/>
            <DerivedVariable name="V" dimension="none" value="v / VOLT_SCALE"/>
        </Dynamics>
    </ComponentType>

    <ComponentType name="Channelpedia_Ca_LVAs_4_h_tau" extends="baseVoltageDepTime">
        <Constant name = "TIME_SCALE" value = "1 ms" dimension = "time"/>
        <Constant name = "VOLT_SCALE" value = "1 mV" dimension = "voltage"/>
        <Dynamics>
            <DerivedVariable name="t" dimension="none" exposure="t" value="(20.0000 + 50.0000/(1+exp(((V-10)+40.000)/7))) * TIME_SCALE"/>
            <DerivedVariable name="V" dimension="none" value="v / VOLT_SCALE"/>
        </Dynamics>
    </ComponentType>

    <ComponentType name="Channelpedia_Ca_LVAs_4_h_inf" extends="baseVoltageDepVariable">
        <Constant name = "TIME_SCALE" value = "1 ms" dimension = "time"/>
        <Constant name = "VOLT_SCALE" value = "1 mV" dimension = "voltage"/>
        <Dynamics>
            <DerivedVariable name="x" dimension="none" exposure="x" value="1.0000/(1+ exp(((V-10)+80.000)/6.4))"/>
            <DerivedVariable name="V" dimension="none" value="v / VOLT_SCALE"/>
        </Dynamics>
    </ComponentType>

    <ComponentType name="Channelpedia_Ca_LVAs_4_m_inf" extends="baseVoltageDepVariable">
        <Constant name = "TIME_SCALE" value = "1 ms" dimension = "time"/>
        <Constant name = "VOLT_SCALE" value = "1 mV" dimension = "voltage"/>
        <Dynamics>
            <DerivedVariable name="x" dimension="none" exposure="x" value="1.0000/(1+ exp(((V-10)+30.000)/-6))"/>
            <DerivedVariable name="V" dimension="none" value="v / VOLT_SCALE"/>
        </Dynamics>
    </ComponentType>

</neuroml>
