<neuroml xmlns="http://www.neuroml.org/schema/neuroml2"  xmlns:xs="http://www.w3.org/2001/XMLSchema" xmlns:xsi="http://www.w3.org/2001/XMLSchema-instance" xsi:schemaLocation="http://www.neuroml.org/schema/neuroml2 https://raw.github.com/NeuroML/NeuroML2/development/Schemas/NeuroML2/NeuroML_v2beta5.xsd" id="Example5_bbpNet">
    <notes>Network read in from BBP connectome: /home/padraig/git/NetworkShorthand/proposal/test_files/cons_locs_pathways_mc0_Column.h5</notes>
    <include href="test_files/ampa.synapse.nml"></include>
    <include href="test_files/gaba.synapse.nml"></include>
    <include href="test_files/inputs.nml"></include>
    <include href="test_files/hhcell.cell.nml"></include>
    <network id="Example5_bbpNet">
        <notes>Network read in from BBP connectome: /home/padraig/git/NetworkShorthand/proposal/test_files/cons_locs_pathways_mc0_Column.h5</notes>
        <population id="L23_BTC" component="hhcell" size="1" type="populationList">
            <instance id="0">
                <location x="356.236337999999989" y="1792.841529000000037" z="21.168126999999998"/>
            </instance>
        </population>
        <population id="L23_DBC" component="hhcell" size="1" type="populationList">
            <instance id="0">
                <location x="196.658643000000012" y="1832.851582000000008" z="115.746105999999997"/>
            </instance>
        </population>
        <population id="L23_LBC" component="hhcell" size="4" type="populationList">
            <instance id="0">
                <location x="241.599814000000009" y="1820.348322999999937" z="158.950753999999989"/>
            </instance>
            <instance id="1">
                <location x="325.220248000000026" y="1866.872078999999985" z="313.31481500000001"/>
            </instance>
            <instance id="2">
                <location x="212.328920000000011" y="1859.893516000000091" z="171.620958000000002"/>
            </instance>
            <instance id="3">
                <location x="549.503876999999989" y="1887.226222000000007" z="140.791730999999999"/>
            </instance>
        </population>
        <population id="L23_MC" component="hhcell" size="3" type="populationList">
            <instance id="0">
                <location x="375.624229000000014" y="1794.0024370000001" z="186.224415999999991"/>
            </instance>
            <instance id="1">
                <location x="326.328603999999984" y="1778.210863000000018" z="73.343790999999996"/>
            </instance>
            <instance id="2">
                <location x="261.815400000000011" y="1789.54695700000002" z="32.791604"/>
            </instance>
        </population>
        <population id="L23_NBC" component="hhcell" size="2" type="populationList">
            <instance id="0">
                <location x="237.848330000000004" y="1791.852521999999908" z="73.395139"/>
            </instance>
            <instance id="1">
                <location x="178.910986000000008" y="1822.38373700000011" z="92.192785000000001"/>
            </instance>
        </population>
        <population id="L23_PC" component="hhcell" size="58" type="populationList">
            <instance id="0">
                <location x="367.868552000000022" y="1815.695946999999933" z="194.611066999999991"/>
            </instance>
            <instance id="1">
                <location x="351.25714499999998" y="1871.524454999999989" z="177.144738999999987"/>
            </instance>
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        </population>
        <population id="L23_SBC" component="hhcell" size="1" type="populationList">
            <instance id="0">
                <location x="435.83981399999999" y="1837.213183999999956" z="9.738761999999999"/>
            </instance>
        </population>
        <population id="L4_LBC" component="hhcell" size="1" type="populationList">
            <instance id="0">
                <location x="190.790134999999992" y="1399.200133000000051" z="332.861484000000019"/>
            </instance>
        </population>
        <population id="L4_MC" component="hhcell" size="1" type="populationList">
            <instance id="0">
                <location x="401.96072700000002" y="1389.573437999999896" z="178.71651"/>
            </instance>
        </population>
        <population id="L4_PC" component="hhcell" size="26" type="populationList">
            <instance id="0">
                <location x="413.076017999999976" y="1330.332239000000072" z="196.098367999999994"/>
            </instance>
            <instance id="1">
                <location x="384.224923999999987" y="1325.889149000000089" z="275.521611000000007"/>
            </instance>
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        </population>
        <population id="L4_SP" component="hhcell" size="10" type="populationList">
            <instance id="0">
                <location x="347.197268000000008" y="1377.725198000000091" z="120.294461999999996"/>
            </instance>
            <instance id="1">
                <location x="387.834377000000018" y="1401.421677999999929" z="160.226425000000006"/>
            </instance>
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        </population>
        <population id="L4_SS" component="hhcell" size="4" type="populationList">
            <instance id="0">
                <location x="285.59619600000002" y="1229.62219899999991" z="193.900806999999986"/>
            </instance>
            <instance id="1">
                <location x="254.031977000000012" y="1251.837649000000056" z="256.480065000000025"/>
            </instance>
            <instance id="2">
                <location x="373.297166000000004" y="1359.212324000000081" z="357.536719000000005"/>
            </instance>
            <instance id="3">
                <location x="527.579516000000012" y="1246.654044000000113" z="254.338609999999989"/>
            </instance>
        </population>
        <population id="L5_LBC" component="hhcell" size="2" type="populationList">
            <instance id="0">
                <location x="327.473118999999997" y="838.234251999999969" z="28.599463"/>
            </instance>
            <instance id="1">
                <location x="295.599057000000016" y="891.560237000000029" z="401.774463000000026"/>
            </instance>
        </population>
        <population id="L5_MC" component="hhcell" size="3" type="populationList">
            <instance id="0">
                <location x="275.976283000000024" y="757.219774000000029" z="229.408652999999987"/>
            </instance>
            <instance id="1">
                <location x="311.765190000000018" y="1052.563693000000058" z="271.532208000000026"/>
            </instance>
            <instance id="2">
                <location x="255.990267999999986" y="719.276284000000032" z="349.607714999999985"/>
            </instance>
        </population>
        <population id="L5_NBC" component="hhcell" size="2" type="populationList">
            <instance id="0">
                <location x="459.779368999999974" y="1002.31420700000001" z="40.237119999999997"/>
            </instance>
            <instance id="1">
                <location x="417.980149999999981" y="1205.3631519999999" z="81.310947999999996"/>
            </instance>
        </population>
        <population id="L5_STPC" component="hhcell" size="3" type="populationList">
            <instance id="0">
                <location x="370.752257999999983" y="1134.603671000000077" z="284.254276000000004"/>
            </instance>
            <instance id="1">
                <location x="264.323802000000001" y="1142.807669000000033" z="120.545007999999996"/>
            </instance>
            <instance id="2">
                <location x="197.48739599999999" y="1027.951700000000073" z="228.784773999999999"/>
            </instance>
        </population>
        <population id="L5_TTPC1" component="hhcell" size="24" type="populationList">
            <instance id="0">
                <location x="326.708333999999979" y="1101.787679999999909" z="199.996375"/>
            </instance>
            <instance id="1">
                <location x="372.276145999999983" y="904.891733000000045" z="249.009460999999988"/>
            </instance>
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        </population>
        <population id="L5_TTPC2" component="hhcell" size="19" type="populationList">
            <instance id="0">
                <location x="373.583489999999983" y="970.523716000000036" z="142.660046999999992"/>
            </instance>
            <instance id="1">
                <location x="420.803373000000022" y="978.727712999999994" z="170.359217000000001"/>
            </instance>
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        </population>
        <population id="L5_UTPC" component="hhcell" size="3" type="populationList">
            <instance id="0">
                <location x="348.870520999999997" y="797.21426299999996" z="57.424773999999999"/>
            </instance>
            <instance id="1">
                <location x="369.259271000000012" y="1164.343163000000004" z="141.71082899999999"/>
            </instance>
            <instance id="2">
                <location x="472.155403999999976" y="1028.977200000000039" z="95.432811000000001"/>
            </instance>
        </population>
        <population id="L6_BPC" component="hhcell" size="31" type="populationList">
            <instance id="0">
                <location x="375.063679999999977" y="566.965114999999969" z="189.017955000000001"/>
            </instance>
            <instance id="1">
                <location x="317.799930000000018" y="129.228577999999999" z="187.95623599999999"/>
            </instance>
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        </population>
        <population id="L6_IPC" component="hhcell" size="34" type="populationList">
            <instance id="0">
                <location x="315.930915000000027" y="413.757326999999975" z="251.266482999999994"/>
            </instance>
            <instance id="1">
                <location x="314.569304999999986" y="337.153433000000007" z="233.771861000000001"/>
            </instance>
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        </population>
        <population id="L6_LBC" component="hhcell" size="4" type="populationList">
            <instance id="0">
                <location x="251.828866000000005" y="692.814370000000054" z="188.071368000000007"/>
            </instance>
            <instance id="1">
                <location x="480.644047999999998" y="386.398793000000012" z="200.392729000000003"/>
            </instance>
            <instance id="2">
                <location x="377.951938999999982" y="672.295469000000026" z="283.736634999999978"/>
            </instance>
            <instance id="3">
                <location x="189.722876000000014" y="43.049196999999999" z="175.292103999999995"/>
            </instance>
        </population>
        <population id="L6_MC" component="hhcell" size="3" type="populationList">
            <instance id="0">
                <location x="316.079556000000025" y="249.606125999999989" z="176.094437999999997"/>
            </instance>
            <instance id="1">
                <location x="288.198345000000018" y="600.479319000000032" z="246.732163000000014"/>
            </instance>
            <instance id="2">
                <location x="410.202446000000009" y="69.723766999999995" z="143.876791999999995"/>
            </instance>
        </population>
        <population id="L6_NBC" component="hhcell" size="1" type="populationList">
            <instance id="0">
                <location x="311.787162000000023" y="546.446215000000052" z="344.92715800000002"/>
            </instance>
        </population>
        <population id="L6_TPC_L1" component="hhcell" size="16" type="populationList">
            <instance id="0">
                <location x="353.219891000000018" y="391.870499999999993" z="192.746363000000002"/>
            </instance>
            <instance id="1">
                <location x="298.216180000000008" y="665.455835999999977" z="234.179673000000008"/>
            </instance>
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        </population>
        <population id="L6_TPC_L4" component="hhcell" size="14" type="populationList">
            <instance id="0">
                <location x="361.452079000000026" y="205.832471999999996" z="230.672573999999997"/>
            </instance>
            <instance id="1">
                <location x="318.433557000000008" y="603.899135000000001" z="39.000390000000003"/>
            </instance>
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        </population>
        <population id="L6_UTPC" component="hhcell" size="17" type="populationList">
            <instance id="0">
                <location x="360.022277999999972" y="698.28607599999998" z="169.744769999999988"/>
            </instance>
            <instance id="1">
                <location x="369.278953999999999" y="326.210019999999986" z="170.016792000000009"/>
            </instance>
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        </population>
        <projection id="Proj__L23_BTC__L23_PC" presynapticPopulation="L23_BTC" postsynapticPopulation="L23_PC" synapse="gaba">
            <connectionWD id="0" preCellId="../L23_BTC/0/hhcell" postCellId="../L23_PC/15/hhcell" weight="1." delay="1ms"/>
            <connectionWD id="1" preCellId="../L23_BTC/0/hhcell" postCellId="../L23_PC/16/hhcell" weight="1." delay="1ms"/>
        </projection>
        <projection id="Proj__L23_BTC__L4_PC" presynapticPopulation="L23_BTC" postsynapticPopulation="L4_PC" synapse="gaba">
            <connectionWD id="0" preCellId="../L23_BTC/0/hhcell" postCellId="../L4_PC/22/hhcell" weight="1." delay="1ms"/>
        </projection>
        <projection id="Proj__L23_DBC__L23_PC" presynapticPopulation="L23_DBC" postsynapticPopulation="L23_PC" synapse="gaba">
            <connectionWD id="0" preCellId="../L23_DBC/0/hhcell" postCellId="../L23_PC/16/hhcell" weight="1." delay="1ms"/>
            <connectionWD id="1" preCellId="../L23_DBC/0/hhcell" postCellId="../L23_PC/34/hhcell" weight="1." delay="1ms"/>
        </projection>
        <projection id="Proj__L23_LBC__L23_PC" presynapticPopulation="L23_LBC" postsynapticPopulation="L23_PC" synapse="gaba">
            <connectionWD id="0" preCellId="../L23_LBC/1/hhcell" postCellId="../L23_PC/4/hhcell" weight="1." delay="1ms"/>
            <connectionWD id="1" preCellId="../L23_LBC/3/hhcell" postCellId="../L23_PC/36/hhcell" weight="1." delay="1ms"/>
        </projection>
        <projection id="Proj__L23_LBC__L5_TTPC1" presynapticPopulation="L23_LBC" postsynapticPopulation="L5_TTPC1" synapse="gaba">
            <connectionWD id="0" preCellId="../L23_LBC/0/hhcell" postCellId="../L5_TTPC1/4/hhcell" weight="1." delay="1ms"/>
            <connectionWD id="1" preCellId="../L23_LBC/1/hhcell" postCellId="../L5_TTPC1/16/hhcell" weight="1." delay="1ms"/>
            <connectionWD id="2" preCellId="../L23_LBC/2/hhcell" postCellId="../L5_TTPC1/3/hhcell" weight="1." delay="1ms"/>
        </projection>
        <projection id="Proj__L23_MC__L23_MC" presynapticPopulation="L23_MC" postsynapticPopulation="L23_MC" synapse="gaba">
            <connectionWD id="0" preCellId="../L23_MC/0/hhcell" postCellId="../L23_MC/1/hhcell" weight="1." delay="1ms"/>
            <connectionWD id="1" preCellId="../L23_MC/1/hhcell" postCellId="../L23_MC/2/hhcell" weight="1." delay="1ms"/>
        </projection>
        <projection id="Proj__L23_MC__L23_NBC" presynapticPopulation="L23_MC" postsynapticPopulation="L23_NBC" synapse="gaba">
            <connectionWD id="0" preCellId="../L23_MC/2/hhcell" postCellId="../L23_NBC/1/hhcell" weight="1." delay="1ms"/>
        </projection>
        <projection id="Proj__L23_MC__L23_PC" presynapticPopulation="L23_MC" postsynapticPopulation="L23_PC" synapse="gaba">
            <connectionWD id="0" preCellId="../L23_MC/1/hhcell" postCellId="../L23_PC/27/hhcell" weight="1." delay="1ms"/>
            <connectionWD id="1" preCellId="../L23_MC/1/hhcell" postCellId="../L23_PC/51/hhcell" weight="1." delay="1ms"/>
            <connectionWD id="2" preCellId="../L23_MC/2/hhcell" postCellId="../L23_PC/27/hhcell" weight="1." delay="1ms"/>
        </projection>
        <projection id="Proj__L23_MC__L4_SP" presynapticPopulation="L23_MC" postsynapticPopulation="L4_SP" synapse="gaba">
            <connectionWD id="0" preCellId="../L23_MC/1/hhcell" postCellId="../L4_SP/3/hhcell" weight="1." delay="1ms"/>
        </projection>
        <projection id="Proj__L23_NBC__L23_PC" presynapticPopulation="L23_NBC" postsynapticPopulation="L23_PC" synapse="gaba">
            <connectionWD id="0" preCellId="../L23_NBC/0/hhcell" postCellId="../L23_PC/30/hhcell" weight="1." delay="1ms"/>
        </projection>
        <projection id="Proj__L23_PC__L23_BTC" presynapticPopulation="L23_PC" postsynapticPopulation="L23_BTC" synapse="ampa">
            <connectionWD id="0" preCellId="../L23_PC/15/hhcell" postCellId="../L23_BTC/0/hhcell" weight="1." delay="1ms"/>
        </projection>
        <projection id="Proj__L23_PC__L23_LBC" presynapticPopulation="L23_PC" postsynapticPopulation="L23_LBC" synapse="ampa">
            <connectionWD id="0" preCellId="../L23_PC/12/hhcell" postCellId="../L23_LBC/3/hhcell" weight="1." delay="1ms"/>
            <connectionWD id="1" preCellId="../L23_PC/34/hhcell" postCellId="../L23_LBC/0/hhcell" weight="1." delay="1ms"/>
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        </projection>
        <projection id="Proj__L23_PC__L23_MC" presynapticPopulation="L23_PC" postsynapticPopulation="L23_MC" synapse="ampa">
            <connectionWD id="0" preCellId="../L23_PC/57/hhcell" postCellId="../L23_MC/1/hhcell" weight="1." delay="1ms"/>
        </projection>
        <projection id="Proj__L23_PC__L23_NBC" presynapticPopulation="L23_PC" postsynapticPopulation="L23_NBC" synapse="ampa">
            <connectionWD id="0" preCellId="../L23_PC/4/hhcell" postCellId="../L23_NBC/0/hhcell" weight="1." delay="1ms"/>
            <connectionWD id="1" preCellId="../L23_PC/6/hhcell" postCellId="../L23_NBC/0/hhcell" weight="1." delay="1ms"/>
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        </projection>
        <projection id="Proj__L23_PC__L23_PC" presynapticPopulation="L23_PC" postsynapticPopulation="L23_PC" synapse="ampa">
            <connectionWD id="0" preCellId="../L23_PC/0/hhcell" postCellId="../L23_PC/8/hhcell" weight="1." delay="1ms"/>
            <connectionWD id="1" preCellId="../L23_PC/5/hhcell" postCellId="../L23_PC/29/hhcell" weight="1." delay="1ms"/>
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        </projection>
        <projection id="Proj__L23_PC__L4_PC" presynapticPopulation="L23_PC" postsynapticPopulation="L4_PC" synapse="ampa">
            <connectionWD id="0" preCellId="../L23_PC/5/hhcell" postCellId="../L4_PC/24/hhcell" weight="1." delay="1ms"/>
            <connectionWD id="1" preCellId="../L23_PC/6/hhcell" postCellId="../L4_PC/3/hhcell" weight="1." delay="1ms"/>
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        </projection>
        <projection id="Proj__L23_PC__L4_SP" presynapticPopulation="L23_PC" postsynapticPopulation="L4_SP" synapse="ampa">
            <connectionWD id="0" preCellId="../L23_PC/33/hhcell" postCellId="../L4_SP/0/hhcell" weight="1." delay="1ms"/>
            <connectionWD id="1" preCellId="../L23_PC/36/hhcell" postCellId="../L4_SP/2/hhcell" weight="1." delay="1ms"/>
            <connectionWD id="2" preCellId="../L23_PC/48/hhcell" postCellId="../L4_SP/9/hhcell" weight="1." delay="1ms"/>
            <connectionWD id="3" preCellId="../L23_PC/57/hhcell" postCellId="../L4_SP/0/hhcell" weight="1." delay="1ms"/>
        </projection>
        <projection id="Proj__L23_PC__L4_SS" presynapticPopulation="L23_PC" postsynapticPopulation="L4_SS" synapse="ampa">
            <connectionWD id="0" preCellId="../L23_PC/20/hhcell" postCellId="../L4_SS/0/hhcell" weight="1." delay="1ms"/>
            <connectionWD id="1" preCellId="../L23_PC/27/hhcell" postCellId="../L4_SS/0/hhcell" weight="1." delay="1ms"/>
            <connectionWD id="2" preCellId="../L23_PC/28/hhcell" postCellId="../L4_SS/0/hhcell" weight="1." delay="1ms"/>
            <connectionWD id="3" preCellId="../L23_PC/38/hhcell" postCellId="../L4_SS/1/hhcell" weight="1." delay="1ms"/>
        </projection>
        <projection id="Proj__L23_PC__L5_MC" presynapticPopulation="L23_PC" postsynapticPopulation="L5_MC" synapse="ampa">
            <connectionWD id="0" preCellId="../L23_PC/43/hhcell" postCellId="../L5_MC/0/hhcell" weight="1." delay="1ms"/>
        </projection>
        <projection id="Proj__L23_PC__L5_NBC" presynapticPopulation="L23_PC" postsynapticPopulation="L5_NBC" synapse="ampa">
            <connectionWD id="0" preCellId="../L23_PC/16/hhcell" postCellId="../L5_NBC/1/hhcell" weight="1." delay="1ms"/>
        </projection>
        <projection id="Proj__L23_PC__L5_STPC" presynapticPopulation="L23_PC" postsynapticPopulation="L5_STPC" synapse="ampa">
            <connectionWD id="0" preCellId="../L23_PC/3/hhcell" postCellId="../L5_STPC/1/hhcell" weight="1." delay="1ms"/>
            <connectionWD id="1" preCellId="../L23_PC/4/hhcell" postCellId="../L5_STPC/2/hhcell" weight="1." delay="1ms"/>
            <connectionWD id="2" preCellId="../L23_PC/20/hhcell" postCellId="../L5_STPC/1/hhcell" weight="1." delay="1ms"/>
        </projection>
        <projection id="Proj__L23_PC__L5_TTPC1" presynapticPopulation="L23_PC" postsynapticPopulation="L5_TTPC1" synapse="ampa">
            <connectionWD id="0" preCellId="../L23_PC/0/hhcell" postCellId="../L5_TTPC1/2/hhcell" weight="1." delay="1ms"/>
            <connectionWD id="1" preCellId="../L23_PC/2/hhcell" postCellId="../L5_TTPC1/7/hhcell" weight="1." delay="1ms"/>
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        </projection>
        <projection id="Proj__L23_PC__L5_TTPC2" presynapticPopulation="L23_PC" postsynapticPopulation="L5_TTPC2" synapse="ampa">
            <connectionWD id="0" preCellId="../L23_PC/1/hhcell" postCellId="../L5_TTPC2/10/hhcell" weight="1." delay="1ms"/>
            <connectionWD id="1" preCellId="../L23_PC/5/hhcell" postCellId="../L5_TTPC2/5/hhcell" weight="1." delay="1ms"/>
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        </projection>
        <projection id="Proj__L23_PC__L5_UTPC" presynapticPopulation="L23_PC" postsynapticPopulation="L5_UTPC" synapse="ampa">
            <connectionWD id="0" preCellId="../L23_PC/15/hhcell" postCellId="../L5_UTPC/1/hhcell" weight="1." delay="1ms"/>
            <connectionWD id="1" preCellId="../L23_PC/27/hhcell" postCellId="../L5_UTPC/1/hhcell" weight="1." delay="1ms"/>
        </projection>
        <projection id="Proj__L23_PC__L6_BPC" presynapticPopulation="L23_PC" postsynapticPopulation="L6_BPC" synapse="ampa">
            <connectionWD id="0" preCellId="../L23_PC/0/hhcell" postCellId="../L6_BPC/7/hhcell" weight="1." delay="1ms"/>
            <connectionWD id="1" preCellId="../L23_PC/12/hhcell" postCellId="../L6_BPC/15/hhcell" weight="1." delay="1ms"/>
            <connectionWD id="2" preCellId="../L23_PC/40/hhcell" postCellId="../L6_BPC/13/hhcell" weight="1." delay="1ms"/>
        </projection>
        <projection id="Proj__L23_PC__L6_IPC" presynapticPopulation="L23_PC" postsynapticPopulation="L6_IPC" synapse="ampa">
            <connectionWD id="0" preCellId="../L23_PC/14/hhcell" postCellId="../L6_IPC/9/hhcell" weight="1." delay="1ms"/>
        </projection>
        <projection id="Proj__L23_PC__L6_MC" presynapticPopulation="L23_PC" postsynapticPopulation="L6_MC" synapse="ampa">
            <connectionWD id="0" preCellId="../L23_PC/28/hhcell" postCellId="../L6_MC/1/hhcell" weight="1." delay="1ms"/>
        </projection>
        <projection id="Proj__L23_PC__L6_TPC_L1" presynapticPopulation="L23_PC" postsynapticPopulation="L6_TPC_L1" synapse="ampa">
            <connectionWD id="0" preCellId="../L23_PC/3/hhcell" postCellId="../L6_TPC_L1/0/hhcell" weight="1." delay="1ms"/>
            <connectionWD id="1" preCellId="../L23_PC/12/hhcell" postCellId="../L6_TPC_L1/11/hhcell" weight="1." delay="1ms"/>
        </projection>
        <projection id="Proj__L23_PC__L6_UTPC" presynapticPopulation="L23_PC" postsynapticPopulation="L6_UTPC" synapse="ampa">
            <connectionWD id="0" preCellId="../L23_PC/9/hhcell" postCellId="../L6_UTPC/16/hhcell" weight="1." delay="1ms"/>
            <connectionWD id="1" preCellId="../L23_PC/19/hhcell" postCellId="../L6_UTPC/3/hhcell" weight="1." delay="1ms"/>
            <connectionWD id="2" preCellId="../L23_PC/23/hhcell" postCellId="../L6_UTPC/6/hhcell" weight="1." delay="1ms"/>
            <connectionWD id="3" preCellId="../L23_PC/38/hhcell" postCellId="../L6_UTPC/4/hhcell" weight="1." delay="1ms"/>
        </projection>
        <projection id="Proj__L4_LBC__L23_PC" presynapticPopulation="L4_LBC" postsynapticPopulation="L23_PC" synapse="gaba">
            <connectionWD id="0" preCellId="../L4_LBC/0/hhcell" postCellId="../L23_PC/40/hhcell" weight="1." delay="1ms"/>
        </projection>
        <projection id="Proj__L4_MC__L4_PC" presynapticPopulation="L4_MC" postsynapticPopulation="L4_PC" synapse="gaba">
            <connectionWD id="0" preCellId="../L4_MC/0/hhcell" postCellId="../L4_PC/7/hhcell" weight="1." delay="1ms"/>
            <connectionWD id="1" preCellId="../L4_MC/0/hhcell" postCellId="../L4_PC/21/hhcell" weight="1." delay="1ms"/>
        </projection>
        <projection id="Proj__L4_PC__L23_MC" presynapticPopulation="L4_PC" postsynapticPopulation="L23_MC" synapse="ampa">
            <connectionWD id="0" preCellId="../L4_PC/21/hhcell" postCellId="../L23_MC/2/hhcell" weight="1." delay="1ms"/>
        </projection>
        <projection id="Proj__L4_PC__L23_PC" presynapticPopulation="L4_PC" postsynapticPopulation="L23_PC" synapse="ampa">
            <connectionWD id="0" preCellId="../L4_PC/4/hhcell" postCellId="../L23_PC/53/hhcell" weight="1." delay="1ms"/>
            <connectionWD id="1" preCellId="../L4_PC/21/hhcell" postCellId="../L23_PC/5/hhcell" weight="1." delay="1ms"/>
        </projection>
        <projection id="Proj__L4_PC__L4_PC" presynapticPopulation="L4_PC" postsynapticPopulation="L4_PC" synapse="ampa">
            <connectionWD id="0" preCellId="../L4_PC/2/hhcell" postCellId="../L4_PC/7/hhcell" weight="1." delay="1ms"/>
            <connectionWD id="1" preCellId="../L4_PC/3/hhcell" postCellId="../L4_PC/7/hhcell" weight="1." delay="1ms"/>
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        </projection>
        <projection id="Proj__L4_PC__L4_SP" presynapticPopulation="L4_PC" postsynapticPopulation="L4_SP" synapse="ampa">
            <connectionWD id="0" preCellId="../L4_PC/2/hhcell" postCellId="../L4_SP/0/hhcell" weight="1." delay="1ms"/>
            <connectionWD id="1" preCellId="../L4_PC/10/hhcell" postCellId="../L4_SP/3/hhcell" weight="1." delay="1ms"/>
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        </projection>
        <projection id="Proj__L4_PC__L4_SS" presynapticPopulation="L4_PC" postsynapticPopulation="L4_SS" synapse="ampa">
            <connectionWD id="0" preCellId="../L4_PC/3/hhcell" postCellId="../L4_SS/0/hhcell" weight="1." delay="1ms"/>
        </projection>
        <projection id="Proj__L4_PC__L5_STPC" presynapticPopulation="L4_PC" postsynapticPopulation="L5_STPC" synapse="ampa">
            <connectionWD id="0" preCellId="../L4_PC/1/hhcell" postCellId="../L5_STPC/0/hhcell" weight="1." delay="1ms"/>
            <connectionWD id="1" preCellId="../L4_PC/5/hhcell" postCellId="../L5_STPC/0/hhcell" weight="1." delay="1ms"/>
            <connectionWD id="2" preCellId="../L4_PC/24/hhcell" postCellId="../L5_STPC/1/hhcell" weight="1." delay="1ms"/>
        </projection>
        <projection id="Proj__L4_PC__L5_TTPC1" presynapticPopulation="L4_PC" postsynapticPopulation="L5_TTPC1" synapse="ampa">
            <connectionWD id="0" preCellId="../L4_PC/2/hhcell" postCellId="../L5_TTPC1/0/hhcell" weight="1." delay="1ms"/>
            <connectionWD id="1" preCellId="../L4_PC/3/hhcell" postCellId="../L5_TTPC1/0/hhcell" weight="1." delay="1ms"/>
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        </projection>
        <projection id="Proj__L4_PC__L5_TTPC2" presynapticPopulation="L4_PC" postsynapticPopulation="L5_TTPC2" synapse="ampa">
            <connectionWD id="0" preCellId="../L4_PC/4/hhcell" postCellId="../L5_TTPC2/18/hhcell" weight="1." delay="1ms"/>
            <connectionWD id="1" preCellId="../L4_PC/5/hhcell" postCellId="../L5_TTPC2/15/hhcell" weight="1." delay="1ms"/>
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        </projection>
        <projection id="Proj__L4_PC__L5_UTPC" presynapticPopulation="L4_PC" postsynapticPopulation="L5_UTPC" synapse="ampa">
            <connectionWD id="0" preCellId="../L4_PC/24/hhcell" postCellId="../L5_UTPC/1/hhcell" weight="1." delay="1ms"/>
        </projection>
        <projection id="Proj__L4_PC__L6_BPC" presynapticPopulation="L4_PC" postsynapticPopulation="L6_BPC" synapse="ampa">
            <connectionWD id="0" preCellId="../L4_PC/1/hhcell" postCellId="../L6_BPC/2/hhcell" weight="1." delay="1ms"/>
            <connectionWD id="1" preCellId="../L4_PC/3/hhcell" postCellId="../L6_BPC/3/hhcell" weight="1." delay="1ms"/>
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        </projection>
        <projection id="Proj__L4_PC__L6_IPC" presynapticPopulation="L4_PC" postsynapticPopulation="L6_IPC" synapse="ampa">
            <connectionWD id="0" preCellId="../L4_PC/5/hhcell" postCellId="../L6_IPC/16/hhcell" weight="1." delay="1ms"/>
            <connectionWD id="1" preCellId="../L4_PC/5/hhcell" postCellId="../L6_IPC/22/hhcell" weight="1." delay="1ms"/>
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        </projection>
        <projection id="Proj__L4_PC__L6_TPC_L1" presynapticPopulation="L4_PC" postsynapticPopulation="L6_TPC_L1" synapse="ampa">
            <connectionWD id="0" preCellId="../L4_PC/2/hhcell" postCellId="../L6_TPC_L1/0/hhcell" weight="1." delay="1ms"/>
            <connectionWD id="1" preCellId="../L4_PC/3/hhcell" postCellId="../L6_TPC_L1/0/hhcell" weight="1." delay="1ms"/>
            <connectionWD id="2" preCellId="../L4_PC/4/hhcell" postCellId="../L6_TPC_L1/9/hhcell" weight="1." delay="1ms"/>
            <connectionWD id="3" preCellId="../L4_PC/7/hhcell" postCellId="../L6_TPC_L1/11/hhcell" weight="1." delay="1ms"/>
        </projection>
        <projection id="Proj__L4_PC__L6_TPC_L4" presynapticPopulation="L4_PC" postsynapticPopulation="L6_TPC_L4" synapse="ampa">
            <connectionWD id="0" preCellId="../L4_PC/0/hhcell" postCellId="../L6_TPC_L4/0/hhcell" weight="1." delay="1ms"/>
            <connectionWD id="1" preCellId="../L4_PC/5/hhcell" postCellId="../L6_TPC_L4/10/hhcell" weight="1." delay="1ms"/>
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        </projection>
        <projection id="Proj__L4_PC__L6_UTPC" presynapticPopulation="L4_PC" postsynapticPopulation="L6_UTPC" synapse="ampa">
            <connectionWD id="0" preCellId="../L4_PC/4/hhcell" postCellId="../L6_UTPC/14/hhcell" weight="1." delay="1ms"/>
            <connectionWD id="1" preCellId="../L4_PC/5/hhcell" postCellId="../L6_UTPC/3/hhcell" weight="1." delay="1ms"/>
            <connectionWD id="2" preCellId="../L4_PC/21/hhcell" postCellId="../L6_UTPC/11/hhcell" weight="1." delay="1ms"/>
            <connectionWD id="3" preCellId="../L4_PC/24/hhcell" postCellId="../L6_UTPC/14/hhcell" weight="1." delay="1ms"/>
        </projection>
        <projection id="Proj__L4_SP__L4_PC" presynapticPopulation="L4_SP" postsynapticPopulation="L4_PC" synapse="gaba">
            <connectionWD id="0" preCellId="../L4_SP/1/hhcell" postCellId="../L4_PC/8/hhcell" weight="1." delay="1ms"/>
            <connectionWD id="1" preCellId="../L4_SP/2/hhcell" postCellId="../L4_PC/22/hhcell" weight="1." delay="1ms"/>
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        </projection>
        <projection id="Proj__L4_SP__L5_STPC" presynapticPopulation="L4_SP" postsynapticPopulation="L5_STPC" synapse="gaba">
            <connectionWD id="0" preCellId="../L4_SP/2/hhcell" postCellId="../L5_STPC/0/hhcell" weight="1." delay="1ms"/>
        </projection>
        <projection id="Proj__L4_SP__L5_TTPC1" presynapticPopulation="L4_SP" postsynapticPopulation="L5_TTPC1" synapse="gaba">
            <connectionWD id="0" preCellId="../L4_SP/2/hhcell" postCellId="../L5_TTPC1/18/hhcell" weight="1." delay="1ms"/>
            <connectionWD id="1" preCellId="../L4_SP/5/hhcell" postCellId="../L5_TTPC1/10/hhcell" weight="1." delay="1ms"/>
            <connectionWD id="2" preCellId="../L4_SP/8/hhcell" postCellId="../L5_TTPC1/9/hhcell" weight="1." delay="1ms"/>
            <connectionWD id="3" preCellId="../L4_SP/8/hhcell" postCellId="../L5_TTPC1/22/hhcell" weight="1." delay="1ms"/>
        </projection>
        <projection id="Proj__L4_SP__L5_TTPC2" presynapticPopulation="L4_SP" postsynapticPopulation="L5_TTPC2" synapse="gaba">
            <connectionWD id="0" preCellId="../L4_SP/4/hhcell" postCellId="../L5_TTPC2/7/hhcell" weight="1." delay="1ms"/>
            <connectionWD id="1" preCellId="../L4_SP/4/hhcell" postCellId="../L5_TTPC2/17/hhcell" weight="1." delay="1ms"/>
            <connectionWD id="2" preCellId="../L4_SP/7/hhcell" postCellId="../L5_TTPC2/11/hhcell" weight="1." delay="1ms"/>
            <connectionWD id="3" preCellId="../L4_SP/8/hhcell" postCellId="../L5_TTPC2/10/hhcell" weight="1." delay="1ms"/>
        </projection>
        <projection id="Proj__L4_SP__L6_BPC" presynapticPopulation="L4_SP" postsynapticPopulation="L6_BPC" synapse="gaba">
            <connectionWD id="0" preCellId="../L4_SP/1/hhcell" postCellId="../L6_BPC/20/hhcell" weight="1." delay="1ms"/>
            <connectionWD id="1" preCellId="../L4_SP/2/hhcell" postCellId="../L6_BPC/4/hhcell" weight="1." delay="1ms"/>
            <connectionWD id="2" preCellId="../L4_SP/3/hhcell" postCellId="../L6_BPC/19/hhcell" weight="1." delay="1ms"/>
            <connectionWD id="3" preCellId="../L4_SP/4/hhcell" postCellId="../L6_BPC/10/hhcell" weight="1." delay="1ms"/>
        </projection>
        <projection id="Proj__L4_SP__L6_TPC_L1" presynapticPopulation="L4_SP" postsynapticPopulation="L6_TPC_L1" synapse="gaba">
            <connectionWD id="0" preCellId="../L4_SP/1/hhcell" postCellId="../L6_TPC_L1/0/hhcell" weight="1." delay="1ms"/>
        </projection>
        <projection id="Proj__L4_SP__L6_TPC_L4" presynapticPopulation="L4_SP" postsynapticPopulation="L6_TPC_L4" synapse="gaba">
            <connectionWD id="0" preCellId="../L4_SP/0/hhcell" postCellId="../L6_TPC_L4/13/hhcell" weight="1." delay="1ms"/>
            <connectionWD id="1" preCellId="../L4_SP/4/hhcell" postCellId="../L6_TPC_L4/8/hhcell" weight="1." delay="1ms"/>
            <connectionWD id="2" preCellId="../L4_SP/4/hhcell" postCellId="../L6_TPC_L4/13/hhcell" weight="1." delay="1ms"/>
        </projection>
        <projection id="Proj__L4_SP__L6_UTPC" presynapticPopulation="L4_SP" postsynapticPopulation="L6_UTPC" synapse="gaba">
            <connectionWD id="0" preCellId="../L4_SP/5/hhcell" postCellId="../L6_UTPC/14/hhcell" weight="1." delay="1ms"/>
            <connectionWD id="1" preCellId="../L4_SP/9/hhcell" postCellId="../L6_UTPC/3/hhcell" weight="1." delay="1ms"/>
        </projection>
        <projection id="Proj__L4_SS__L4_PC" presynapticPopulation="L4_SS" postsynapticPopulation="L4_PC" synapse="ampa">
            <connectionWD id="0" preCellId="../L4_SS/2/hhcell" postCellId="../L4_PC/14/hhcell" weight="1." delay="1ms"/>
        </projection>
        <projection id="Proj__L4_SS__L4_SP" presynapticPopulation="L4_SS" postsynapticPopulation="L4_SP" synapse="ampa">
            <connectionWD id="0" preCellId="../L4_SS/0/hhcell" postCellId="../L4_SP/4/hhcell" weight="1." delay="1ms"/>
        </projection>
        <projection id="Proj__L4_SS__L5_TTPC2" presynapticPopulation="L4_SS" postsynapticPopulation="L5_TTPC2" synapse="ampa">
            <connectionWD id="0" preCellId="../L4_SS/0/hhcell" postCellId="../L5_TTPC2/0/hhcell" weight="1." delay="1ms"/>
            <connectionWD id="1" preCellId="../L4_SS/1/hhcell" postCellId="../L5_TTPC2/18/hhcell" weight="1." delay="1ms"/>
            <connectionWD id="2" preCellId="../L4_SS/3/hhcell" postCellId="../L5_TTPC2/11/hhcell" weight="1." delay="1ms"/>
        </projection>
        <projection id="Proj__L4_SS__L6_BPC" presynapticPopulation="L4_SS" postsynapticPopulation="L6_BPC" synapse="ampa">
            <connectionWD id="0" preCellId="../L4_SS/0/hhcell" postCellId="../L6_BPC/0/hhcell" weight="1." delay="1ms"/>
            <connectionWD id="1" preCellId="../L4_SS/2/hhcell" postCellId="../L6_BPC/5/hhcell" weight="1." delay="1ms"/>
        </projection>
        <projection id="Proj__L4_SS__L6_TPC_L1" presynapticPopulation="L4_SS" postsynapticPopulation="L6_TPC_L1" synapse="ampa">
            <connectionWD id="0" preCellId="../L4_SS/0/hhcell" postCellId="../L6_TPC_L1/13/hhcell" weight="1." delay="1ms"/>
        </projection>
        <projection id="Proj__L5_MC__L5_TTPC1" presynapticPopulation="L5_MC" postsynapticPopulation="L5_TTPC1" synapse="gaba">
            <connectionWD id="0" preCellId="../L5_MC/0/hhcell" postCellId="../L5_TTPC1/6/hhcell" weight="1." delay="1ms"/>
            <connectionWD id="1" preCellId="../L5_MC/1/hhcell" postCellId="../L5_TTPC1/5/hhcell" weight="1." delay="1ms"/>
        </projection>
        <projection id="Proj__L5_MC__L5_TTPC2" presynapticPopulation="L5_MC" postsynapticPopulation="L5_TTPC2" synapse="gaba">
            <connectionWD id="0" preCellId="../L5_MC/1/hhcell" postCellId="../L5_TTPC2/5/hhcell" weight="1." delay="1ms"/>
        </projection>
        <projection id="Proj__L5_NBC__L5_TTPC1" presynapticPopulation="L5_NBC" postsynapticPopulation="L5_TTPC1" synapse="gaba">
            <connectionWD id="0" preCellId="../L5_NBC/0/hhcell" postCellId="../L5_TTPC1/21/hhcell" weight="1." delay="1ms"/>
            <connectionWD id="1" preCellId="../L5_NBC/1/hhcell" postCellId="../L5_TTPC1/8/hhcell" weight="1." delay="1ms"/>
        </projection>
        <projection id="Proj__L5_NBC__L6_BPC" presynapticPopulation="L5_NBC" postsynapticPopulation="L6_BPC" synapse="gaba">
            <connectionWD id="0" preCellId="../L5_NBC/0/hhcell" postCellId="../L6_BPC/26/hhcell" weight="1." delay="1ms"/>
        </projection>
        <projection id="Proj__L5_NBC__L6_UTPC" presynapticPopulation="L5_NBC" postsynapticPopulation="L6_UTPC" synapse="gaba">
            <connectionWD id="0" preCellId="../L5_NBC/0/hhcell" postCellId="../L6_UTPC/11/hhcell" weight="1." delay="1ms"/>
        </projection>
        <projection id="Proj__L5_STPC__L4_PC" presynapticPopulation="L5_STPC" postsynapticPopulation="L4_PC" synapse="ampa">
            <connectionWD id="0" preCellId="../L5_STPC/0/hhcell" postCellId="../L4_PC/2/hhcell" weight="1." delay="1ms"/>
        </projection>
        <projection id="Proj__L5_STPC__L5_TTPC1" presynapticPopulation="L5_STPC" postsynapticPopulation="L5_TTPC1" synapse="ampa">
            <connectionWD id="0" preCellId="../L5_STPC/2/hhcell" postCellId="../L5_TTPC1/14/hhcell" weight="1." delay="1ms"/>
        </projection>
        <projection id="Proj__L5_STPC__L5_TTPC2" presynapticPopulation="L5_STPC" postsynapticPopulation="L5_TTPC2" synapse="ampa">
            <connectionWD id="0" preCellId="../L5_STPC/0/hhcell" postCellId="../L5_TTPC2/14/hhcell" weight="1." delay="1ms"/>
            <connectionWD id="1" preCellId="../L5_STPC/1/hhcell" postCellId="../L5_TTPC2/10/hhcell" weight="1." delay="1ms"/>
            <connectionWD id="2" preCellId="../L5_STPC/2/hhcell" postCellId="../L5_TTPC2/6/hhcell" weight="1." delay="1ms"/>
        </projection>
        <projection id="Proj__L5_STPC__L6_BPC" presynapticPopulation="L5_STPC" postsynapticPopulation="L6_BPC" synapse="ampa">
            <connectionWD id="0" preCellId="../L5_STPC/0/hhcell" postCellId="../L6_BPC/6/hhcell" weight="1." delay="1ms"/>
        </projection>
        <projection id="Proj__L5_STPC__L6_TPC_L1" presynapticPopulation="L5_STPC" postsynapticPopulation="L6_TPC_L1" synapse="ampa">
            <connectionWD id="0" preCellId="../L5_STPC/0/hhcell" postCellId="../L6_TPC_L1/11/hhcell" weight="1." delay="1ms"/>
        </projection>
        <projection id="Proj__L5_STPC__L6_UTPC" presynapticPopulation="L5_STPC" postsynapticPopulation="L6_UTPC" synapse="ampa">
            <connectionWD id="0" preCellId="../L5_STPC/1/hhcell" postCellId="../L6_UTPC/4/hhcell" weight="1." delay="1ms"/>
            <connectionWD id="1" preCellId="../L5_STPC/1/hhcell" postCellId="../L6_UTPC/15/hhcell" weight="1." delay="1ms"/>
        </projection>
        <projection id="Proj__L5_TTPC1__L4_PC" presynapticPopulation="L5_TTPC1" postsynapticPopulation="L4_PC" synapse="ampa">
            <connectionWD id="0" preCellId="../L5_TTPC1/3/hhcell" postCellId="../L4_PC/17/hhcell" weight="1." delay="1ms"/>
            <connectionWD id="1" preCellId="../L5_TTPC1/3/hhcell" postCellId="../L4_PC/18/hhcell" weight="1." delay="1ms"/>
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        </projection>
        <projection id="Proj__L5_TTPC1__L4_SS" presynapticPopulation="L5_TTPC1" postsynapticPopulation="L4_SS" synapse="ampa">
            <connectionWD id="0" preCellId="../L5_TTPC1/4/hhcell" postCellId="../L4_SS/1/hhcell" weight="1." delay="1ms"/>
            <connectionWD id="1" preCellId="../L5_TTPC1/8/hhcell" postCellId="../L4_SS/2/hhcell" weight="1." delay="1ms"/>
        </projection>
        <projection id="Proj__L5_TTPC1__L5_MC" presynapticPopulation="L5_TTPC1" postsynapticPopulation="L5_MC" synapse="ampa">
            <connectionWD id="0" preCellId="../L5_TTPC1/23/hhcell" postCellId="../L5_MC/2/hhcell" weight="1." delay="1ms"/>
        </projection>
        <projection id="Proj__L5_TTPC1__L5_STPC" presynapticPopulation="L5_TTPC1" postsynapticPopulation="L5_STPC" synapse="ampa">
            <connectionWD id="0" preCellId="../L5_TTPC1/3/hhcell" postCellId="../L5_STPC/1/hhcell" weight="1." delay="1ms"/>
            <connectionWD id="1" preCellId="../L5_TTPC1/14/hhcell" postCellId="../L5_STPC/0/hhcell" weight="1." delay="1ms"/>
        </projection>
        <projection id="Proj__L5_TTPC1__L5_TTPC1" presynapticPopulation="L5_TTPC1" postsynapticPopulation="L5_TTPC1" synapse="ampa">
            <connectionWD id="0" preCellId="../L5_TTPC1/0/hhcell" postCellId="../L5_TTPC1/5/hhcell" weight="1." delay="1ms"/>
            <connectionWD id="1" preCellId="../L5_TTPC1/3/hhcell" postCellId="../L5_TTPC1/7/hhcell" weight="1." delay="1ms"/>
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        </projection>
        <projection id="Proj__L5_TTPC1__L5_TTPC2" presynapticPopulation="L5_TTPC1" postsynapticPopulation="L5_TTPC2" synapse="ampa">
            <connectionWD id="0" preCellId="../L5_TTPC1/0/hhcell" postCellId="../L5_TTPC2/1/hhcell" weight="1." delay="1ms"/>
            <connectionWD id="1" preCellId="../L5_TTPC1/2/hhcell" postCellId="../L5_TTPC2/4/hhcell" weight="1." delay="1ms"/>
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        </projection>
        <projection id="Proj__L5_TTPC1__L5_UTPC" presynapticPopulation="L5_TTPC1" postsynapticPopulation="L5_UTPC" synapse="ampa">
            <connectionWD id="0" preCellId="../L5_TTPC1/8/hhcell" postCellId="../L5_UTPC/2/hhcell" weight="1." delay="1ms"/>
        </projection>
        <projection id="Proj__L5_TTPC1__L6_BPC" presynapticPopulation="L5_TTPC1" postsynapticPopulation="L6_BPC" synapse="ampa">
            <connectionWD id="0" preCellId="../L5_TTPC1/0/hhcell" postCellId="../L6_BPC/2/hhcell" weight="1." delay="1ms"/>
            <connectionWD id="1" preCellId="../L5_TTPC1/0/hhcell" postCellId="../L6_BPC/5/hhcell" weight="1." delay="1ms"/>
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        </projection>
        <projection id="Proj__L5_TTPC1__L6_IPC" presynapticPopulation="L5_TTPC1" postsynapticPopulation="L6_IPC" synapse="ampa">
            <connectionWD id="0" preCellId="../L5_TTPC1/2/hhcell" postCellId="../L6_IPC/9/hhcell" weight="1." delay="1ms"/>
            <connectionWD id="1" preCellId="../L5_TTPC1/15/hhcell" postCellId="../L6_IPC/22/hhcell" weight="1." delay="1ms"/>
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        </projection>
        <projection id="Proj__L5_TTPC1__L6_LBC" presynapticPopulation="L5_TTPC1" postsynapticPopulation="L6_LBC" synapse="ampa">
            <connectionWD id="0" preCellId="../L5_TTPC1/2/hhcell" postCellId="../L6_LBC/2/hhcell" weight="1." delay="1ms"/>
            <connectionWD id="1" preCellId="../L5_TTPC1/3/hhcell" postCellId="../L6_LBC/0/hhcell" weight="1." delay="1ms"/>
            <connectionWD id="2" preCellId="../L5_TTPC1/9/hhcell" postCellId="../L6_LBC/0/hhcell" weight="1." delay="1ms"/>
        </projection>
        <projection id="Proj__L5_TTPC1__L6_MC" presynapticPopulation="L5_TTPC1" postsynapticPopulation="L6_MC" synapse="ampa">
            <connectionWD id="0" preCellId="../L5_TTPC1/19/hhcell" postCellId="../L6_MC/1/hhcell" weight="1." delay="1ms"/>
        </projection>
        <projection id="Proj__L5_TTPC1__L6_TPC_L1" presynapticPopulation="L5_TTPC1" postsynapticPopulation="L6_TPC_L1" synapse="ampa">
            <connectionWD id="0" preCellId="../L5_TTPC1/10/hhcell" postCellId="../L6_TPC_L1/3/hhcell" weight="1." delay="1ms"/>
            <connectionWD id="1" preCellId="../L5_TTPC1/15/hhcell" postCellId="../L6_TPC_L1/14/hhcell" weight="1." delay="1ms"/>
            <connectionWD id="2" preCellId="../L5_TTPC1/17/hhcell" postCellId="../L6_TPC_L1/5/hhcell" weight="1." delay="1ms"/>
            <connectionWD id="3" preCellId="../L5_TTPC1/18/hhcell" postCellId="../L6_TPC_L1/13/hhcell" weight="1." delay="1ms"/>
        </projection>
        <projection id="Proj__L5_TTPC1__L6_TPC_L4" presynapticPopulation="L5_TTPC1" postsynapticPopulation="L6_TPC_L4" synapse="ampa">
            <connectionWD id="0" preCellId="../L5_TTPC1/9/hhcell" postCellId="../L6_TPC_L4/9/hhcell" weight="1." delay="1ms"/>
        </projection>
        <projection id="Proj__L5_TTPC1__L6_UTPC" presynapticPopulation="L5_TTPC1" postsynapticPopulation="L6_UTPC" synapse="ampa">
            <connectionWD id="0" preCellId="../L5_TTPC1/7/hhcell" postCellId="../L6_UTPC/4/hhcell" weight="1." delay="1ms"/>
            <connectionWD id="1" preCellId="../L5_TTPC1/8/hhcell" postCellId="../L6_UTPC/3/hhcell" weight="1." delay="1ms"/>
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        </projection>
        <projection id="Proj__L5_TTPC2__L23_PC" presynapticPopulation="L5_TTPC2" postsynapticPopulation="L23_PC" synapse="ampa">
            <connectionWD id="0" preCellId="../L5_TTPC2/3/hhcell" postCellId="../L23_PC/55/hhcell" weight="1." delay="1ms"/>
        </projection>
        <projection id="Proj__L5_TTPC2__L4_PC" presynapticPopulation="L5_TTPC2" postsynapticPopulation="L4_PC" synapse="ampa">
            <connectionWD id="0" preCellId="../L5_TTPC2/3/hhcell" postCellId="../L4_PC/4/hhcell" weight="1." delay="1ms"/>
            <connectionWD id="1" preCellId="../L5_TTPC2/3/hhcell" postCellId="../L4_PC/20/hhcell" weight="1." delay="1ms"/>
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        </projection>
        <projection id="Proj__L5_TTPC2__L4_SP" presynapticPopulation="L5_TTPC2" postsynapticPopulation="L4_SP" synapse="ampa">
            <connectionWD id="0" preCellId="../L5_TTPC2/15/hhcell" postCellId="../L4_SP/8/hhcell" weight="1." delay="1ms"/>
        </projection>
        <projection id="Proj__L5_TTPC2__L4_SS" presynapticPopulation="L5_TTPC2" postsynapticPopulation="L4_SS" synapse="ampa">
            <connectionWD id="0" preCellId="../L5_TTPC2/7/hhcell" postCellId="../L4_SS/3/hhcell" weight="1." delay="1ms"/>
            <connectionWD id="1" preCellId="../L5_TTPC2/13/hhcell" postCellId="../L4_SS/2/hhcell" weight="1." delay="1ms"/>
        </projection>
        <projection id="Proj__L5_TTPC2__L5_MC" presynapticPopulation="L5_TTPC2" postsynapticPopulation="L5_MC" synapse="ampa">
            <connectionWD id="0" preCellId="../L5_TTPC2/15/hhcell" postCellId="../L5_MC/2/hhcell" weight="1." delay="1ms"/>
        </projection>
        <projection id="Proj__L5_TTPC2__L5_TTPC1" presynapticPopulation="L5_TTPC2" postsynapticPopulation="L5_TTPC1" synapse="ampa">
            <connectionWD id="0" preCellId="../L5_TTPC2/0/hhcell" postCellId="../L5_TTPC1/16/hhcell" weight="1." delay="1ms"/>
            <connectionWD id="1" preCellId="../L5_TTPC2/2/hhcell" postCellId="../L5_TTPC1/15/hhcell" weight="1." delay="1ms"/>
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        </projection>
        <projection id="Proj__L5_TTPC2__L5_TTPC2" presynapticPopulation="L5_TTPC2" postsynapticPopulation="L5_TTPC2" synapse="ampa">
            <connectionWD id="0" preCellId="../L5_TTPC2/5/hhcell" postCellId="../L5_TTPC2/14/hhcell" weight="1." delay="1ms"/>
            <connectionWD id="1" preCellId="../L5_TTPC2/5/hhcell" postCellId="../L5_TTPC2/17/hhcell" weight="1." delay="1ms"/>
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        </projection>
        <projection id="Proj__L5_TTPC2__L5_UTPC" presynapticPopulation="L5_TTPC2" postsynapticPopulation="L5_UTPC" synapse="ampa">
            <connectionWD id="0" preCellId="../L5_TTPC2/2/hhcell" postCellId="../L5_UTPC/2/hhcell" weight="1." delay="1ms"/>
            <connectionWD id="1" preCellId="../L5_TTPC2/13/hhcell" postCellId="../L5_UTPC/2/hhcell" weight="1." delay="1ms"/>
            <connectionWD id="2" preCellId="../L5_TTPC2/16/hhcell" postCellId="../L5_UTPC/2/hhcell" weight="1." delay="1ms"/>
        </projection>
        <projection id="Proj__L5_TTPC2__L6_BPC" presynapticPopulation="L5_TTPC2" postsynapticPopulation="L6_BPC" synapse="ampa">
            <connectionWD id="0" preCellId="../L5_TTPC2/0/hhcell" postCellId="../L6_BPC/0/hhcell" weight="1." delay="1ms"/>
            <connectionWD id="1" preCellId="../L5_TTPC2/1/hhcell" postCellId="../L6_BPC/22/hhcell" weight="1." delay="1ms"/>
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        </projection>
        <projection id="Proj__L5_TTPC2__L6_IPC" presynapticPopulation="L5_TTPC2" postsynapticPopulation="L6_IPC" synapse="ampa">
            <connectionWD id="0" preCellId="../L5_TTPC2/0/hhcell" postCellId="../L6_IPC/6/hhcell" weight="1." delay="1ms"/>
            <connectionWD id="1" preCellId="../L5_TTPC2/1/hhcell" postCellId="../L6_IPC/21/hhcell" weight="1." delay="1ms"/>
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        </projection>
        <projection id="Proj__L5_TTPC2__L6_LBC" presynapticPopulation="L5_TTPC2" postsynapticPopulation="L6_LBC" synapse="ampa">
            <connectionWD id="0" preCellId="../L5_TTPC2/9/hhcell" postCellId="../L6_LBC/0/hhcell" weight="1." delay="1ms"/>
            <connectionWD id="1" preCellId="../L5_TTPC2/17/hhcell" postCellId="../L6_LBC/0/hhcell" weight="1." delay="1ms"/>
        </projection>
        <projection id="Proj__L5_TTPC2__L6_TPC_L1" presynapticPopulation="L5_TTPC2" postsynapticPopulation="L6_TPC_L1" synapse="ampa">
            <connectionWD id="0" preCellId="../L5_TTPC2/0/hhcell" postCellId="../L6_TPC_L1/14/hhcell" weight="1." delay="1ms"/>
            <connectionWD id="1" preCellId="../L5_TTPC2/2/hhcell" postCellId="../L6_TPC_L1/3/hhcell" weight="1." delay="1ms"/>
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        </projection>
        <projection id="Proj__L5_TTPC2__L6_TPC_L4" presynapticPopulation="L5_TTPC2" postsynapticPopulation="L6_TPC_L4" synapse="ampa">
            <connectionWD id="0" preCellId="../L5_TTPC2/0/hhcell" postCellId="../L6_TPC_L4/8/hhcell" weight="1." delay="1ms"/>
            <connectionWD id="1" preCellId="../L5_TTPC2/1/hhcell" postCellId="../L6_TPC_L4/7/hhcell" weight="1." delay="1ms"/>
        </projection>
        <projection id="Proj__L5_TTPC2__L6_UTPC" presynapticPopulation="L5_TTPC2" postsynapticPopulation="L6_UTPC" synapse="ampa">
            <connectionWD id="0" preCellId="../L5_TTPC2/2/hhcell" postCellId="../L6_UTPC/8/hhcell" weight="1." delay="1ms"/>
            <connectionWD id="1" preCellId="../L5_TTPC2/2/hhcell" postCellId="../L6_UTPC/14/hhcell" weight="1." delay="1ms"/>
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        </projection>
        <projection id="Proj__L5_UTPC__L4_PC" presynapticPopulation="L5_UTPC" postsynapticPopulation="L4_PC" synapse="ampa">
            <connectionWD id="0" preCellId="../L5_UTPC/0/hhcell" postCellId="../L4_PC/8/hhcell" weight="1." delay="1ms"/>
            <connectionWD id="1" preCellId="../L5_UTPC/2/hhcell" postCellId="../L4_PC/7/hhcell" weight="1." delay="1ms"/>
        </projection>
        <projection id="Proj__L5_UTPC__L4_SP" presynapticPopulation="L5_UTPC" postsynapticPopulation="L4_SP" synapse="ampa">
            <connectionWD id="0" preCellId="../L5_UTPC/2/hhcell" postCellId="../L4_SP/2/hhcell" weight="1." delay="1ms"/>
        </projection>
        <projection id="Proj__L5_UTPC__L4_SS" presynapticPopulation="L5_UTPC" postsynapticPopulation="L4_SS" synapse="ampa">
            <connectionWD id="0" preCellId="../L5_UTPC/1/hhcell" postCellId="../L4_SS/2/hhcell" weight="1." delay="1ms"/>
        </projection>
        <projection id="Proj__L5_UTPC__L5_TTPC1" presynapticPopulation="L5_UTPC" postsynapticPopulation="L5_TTPC1" synapse="ampa">
            <connectionWD id="0" preCellId="../L5_UTPC/1/hhcell" postCellId="../L5_TTPC1/0/hhcell" weight="1." delay="1ms"/>
            <connectionWD id="1" preCellId="../L5_UTPC/1/hhcell" postCellId="../L5_TTPC1/6/hhcell" weight="1." delay="1ms"/>
            <connectionWD id="2" preCellId="../L5_UTPC/1/hhcell" postCellId="../L5_TTPC1/12/hhcell" weight="1." delay="1ms"/>
            <connectionWD id="3" preCellId="../L5_UTPC/2/hhcell" postCellId="../L5_TTPC1/13/hhcell" weight="1." delay="1ms"/>
        </projection>
        <projection id="Proj__L5_UTPC__L6_BPC" presynapticPopulation="L5_UTPC" postsynapticPopulation="L6_BPC" synapse="ampa">
            <connectionWD id="0" preCellId="../L5_UTPC/1/hhcell" postCellId="../L6_BPC/7/hhcell" weight="1." delay="1ms"/>
            <connectionWD id="1" preCellId="../L5_UTPC/2/hhcell" postCellId="../L6_BPC/2/hhcell" weight="1." delay="1ms"/>
            <connectionWD id="2" preCellId="../L5_UTPC/2/hhcell" postCellId="../L6_BPC/19/hhcell" weight="1." delay="1ms"/>
        </projection>
        <projection id="Proj__L5_UTPC__L6_IPC" presynapticPopulation="L5_UTPC" postsynapticPopulation="L6_IPC" synapse="ampa">
            <connectionWD id="0" preCellId="../L5_UTPC/0/hhcell" postCellId="../L6_IPC/18/hhcell" weight="1." delay="1ms"/>
        </projection>
        <projection id="Proj__L5_UTPC__L6_LBC" presynapticPopulation="L5_UTPC" postsynapticPopulation="L6_LBC" synapse="ampa">
            <connectionWD id="0" preCellId="../L5_UTPC/0/hhcell" postCellId="../L6_LBC/0/hhcell" weight="1." delay="1ms"/>
        </projection>
        <projection id="Proj__L5_UTPC__L6_UTPC" presynapticPopulation="L5_UTPC" postsynapticPopulation="L6_UTPC" synapse="ampa">
            <connectionWD id="0" preCellId="../L5_UTPC/0/hhcell" postCellId="../L6_UTPC/4/hhcell" weight="1." delay="1ms"/>
        </projection>
        <projection id="Proj__L6_BPC__L4_PC" presynapticPopulation="L6_BPC" postsynapticPopulation="L4_PC" synapse="ampa">
            <connectionWD id="0" preCellId="../L6_BPC/8/hhcell" postCellId="../L4_PC/8/hhcell" weight="1." delay="1ms"/>
        </projection>
        <projection id="Proj__L6_BPC__L5_STPC" presynapticPopulation="L6_BPC" postsynapticPopulation="L5_STPC" synapse="ampa">
            <connectionWD id="0" preCellId="../L6_BPC/0/hhcell" postCellId="../L5_STPC/0/hhcell" weight="1." delay="1ms"/>
        </projection>
        <projection id="Proj__L6_BPC__L5_TTPC1" presynapticPopulation="L6_BPC" postsynapticPopulation="L5_TTPC1" synapse="ampa">
            <connectionWD id="0" preCellId="../L6_BPC/1/hhcell" postCellId="../L5_TTPC1/14/hhcell" weight="1." delay="1ms"/>
            <connectionWD id="1" preCellId="../L6_BPC/5/hhcell" postCellId="../L5_TTPC1/5/hhcell" weight="1." delay="1ms"/>
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        </projection>
        <projection id="Proj__L6_BPC__L5_TTPC2" presynapticPopulation="L6_BPC" postsynapticPopulation="L5_TTPC2" synapse="ampa">
            <connectionWD id="0" preCellId="../L6_BPC/0/hhcell" postCellId="../L5_TTPC2/1/hhcell" weight="1." delay="1ms"/>
            <connectionWD id="1" preCellId="../L6_BPC/0/hhcell" postCellId="../L5_TTPC2/14/hhcell" weight="1." delay="1ms"/>
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        </projection>
        <projection id="Proj__L6_BPC__L6_BPC" presynapticPopulation="L6_BPC" postsynapticPopulation="L6_BPC" synapse="ampa">
            <connectionWD id="0" preCellId="../L6_BPC/0/hhcell" postCellId="../L6_BPC/4/hhcell" weight="1." delay="1ms"/>
            <connectionWD id="1" preCellId="../L6_BPC/0/hhcell" postCellId="../L6_BPC/16/hhcell" weight="1." delay="1ms"/>
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        </projection>
        <projection id="Proj__L6_BPC__L6_IPC" presynapticPopulation="L6_BPC" postsynapticPopulation="L6_IPC" synapse="ampa">
            <connectionWD id="0" preCellId="../L6_BPC/0/hhcell" postCellId="../L6_IPC/3/hhcell" weight="1." delay="1ms"/>
            <connectionWD id="1" preCellId="../L6_BPC/0/hhcell" postCellId="../L6_IPC/15/hhcell" weight="1." delay="1ms"/>
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        </projection>
        <projection id="Proj__L6_BPC__L6_LBC" presynapticPopulation="L6_BPC" postsynapticPopulation="L6_LBC" synapse="ampa">
            <connectionWD id="0" preCellId="../L6_BPC/5/hhcell" postCellId="../L6_LBC/0/hhcell" weight="1." delay="1ms"/>
        </projection>
        <projection id="Proj__L6_BPC__L6_MC" presynapticPopulation="L6_BPC" postsynapticPopulation="L6_MC" synapse="ampa">
            <connectionWD id="0" preCellId="../L6_BPC/4/hhcell" postCellId="../L6_MC/2/hhcell" weight="1." delay="1ms"/>
        </projection>
        <projection id="Proj__L6_BPC__L6_TPC_L1" presynapticPopulation="L6_BPC" postsynapticPopulation="L6_TPC_L1" synapse="ampa">
            <connectionWD id="0" preCellId="../L6_BPC/0/hhcell" postCellId="../L6_TPC_L1/0/hhcell" weight="1." delay="1ms"/>
            <connectionWD id="1" preCellId="../L6_BPC/2/hhcell" postCellId="../L6_TPC_L1/0/hhcell" weight="1." delay="1ms"/>
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        </projection>
        <projection id="Proj__L6_BPC__L6_TPC_L4" presynapticPopulation="L6_BPC" postsynapticPopulation="L6_TPC_L4" synapse="ampa">
            <connectionWD id="0" preCellId="../L6_BPC/2/hhcell" postCellId="../L6_TPC_L4/0/hhcell" weight="1." delay="1ms"/>
            <connectionWD id="1" preCellId="../L6_BPC/4/hhcell" postCellId="../L6_TPC_L4/0/hhcell" weight="1." delay="1ms"/>
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        </projection>
        <projection id="Proj__L6_BPC__L6_UTPC" presynapticPopulation="L6_BPC" postsynapticPopulation="L6_UTPC" synapse="ampa">
            <connectionWD id="0" preCellId="../L6_BPC/5/hhcell" postCellId="../L6_UTPC/1/hhcell" weight="1." delay="1ms"/>
            <connectionWD id="1" preCellId="../L6_BPC/7/hhcell" postCellId="../L6_UTPC/16/hhcell" weight="1." delay="1ms"/>
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        </projection>
        <projection id="Proj__L6_IPC__L5_MC" presynapticPopulation="L6_IPC" postsynapticPopulation="L5_MC" synapse="ampa">
            <connectionWD id="0" preCellId="../L6_IPC/26/hhcell" postCellId="../L5_MC/2/hhcell" weight="1." delay="1ms"/>
        </projection>
        <projection id="Proj__L6_IPC__L5_TTPC1" presynapticPopulation="L6_IPC" postsynapticPopulation="L5_TTPC1" synapse="ampa">
            <connectionWD id="0" preCellId="../L6_IPC/2/hhcell" postCellId="../L5_TTPC1/15/hhcell" weight="1." delay="1ms"/>
        </projection>
        <projection id="Proj__L6_IPC__L5_TTPC2" presynapticPopulation="L6_IPC" postsynapticPopulation="L5_TTPC2" synapse="ampa">
            <connectionWD id="0" preCellId="../L6_IPC/10/hhcell" postCellId="../L5_TTPC2/6/hhcell" weight="1." delay="1ms"/>
        </projection>
        <projection id="Proj__L6_IPC__L6_BPC" presynapticPopulation="L6_IPC" postsynapticPopulation="L6_BPC" synapse="ampa">
            <connectionWD id="0" preCellId="../L6_IPC/2/hhcell" postCellId="../L6_BPC/0/hhcell" weight="1." delay="1ms"/>
            <connectionWD id="1" preCellId="../L6_IPC/2/hhcell" postCellId="../L6_BPC/21/hhcell" weight="1." delay="1ms"/>
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        </projection>
        <projection id="Proj__L6_IPC__L6_IPC" presynapticPopulation="L6_IPC" postsynapticPopulation="L6_IPC" synapse="ampa">
            <connectionWD id="0" preCellId="../L6_IPC/0/hhcell" postCellId="../L6_IPC/10/hhcell" weight="1." delay="1ms"/>
            <connectionWD id="1" preCellId="../L6_IPC/1/hhcell" postCellId="../L6_IPC/11/hhcell" weight="1." delay="1ms"/>
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        </projection>
        <projection id="Proj__L6_IPC__L6_MC" presynapticPopulation="L6_IPC" postsynapticPopulation="L6_MC" synapse="ampa">
            <connectionWD id="0" preCellId="../L6_IPC/7/hhcell" postCellId="../L6_MC/2/hhcell" weight="1." delay="1ms"/>
            <connectionWD id="1" preCellId="../L6_IPC/21/hhcell" postCellId="../L6_MC/1/hhcell" weight="1." delay="1ms"/>
        </projection>
        <projection id="Proj__L6_IPC__L6_TPC_L1" presynapticPopulation="L6_IPC" postsynapticPopulation="L6_TPC_L1" synapse="ampa">
            <connectionWD id="0" preCellId="../L6_IPC/2/hhcell" postCellId="../L6_TPC_L1/4/hhcell" weight="1." delay="1ms"/>
            <connectionWD id="1" preCellId="../L6_IPC/3/hhcell" postCellId="../L6_TPC_L1/2/hhcell" weight="1." delay="1ms"/>
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        </projection>
        <projection id="Proj__L6_IPC__L6_TPC_L4" presynapticPopulation="L6_IPC" postsynapticPopulation="L6_TPC_L4" synapse="ampa">
            <connectionWD id="0" preCellId="../L6_IPC/1/hhcell" postCellId="../L6_TPC_L4/0/hhcell" weight="1." delay="1ms"/>
            <connectionWD id="1" preCellId="../L6_IPC/10/hhcell" postCellId="../L6_TPC_L4/1/hhcell" weight="1." delay="1ms"/>
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        </projection>
        <projection id="Proj__L6_IPC__L6_UTPC" presynapticPopulation="L6_IPC" postsynapticPopulation="L6_UTPC" synapse="ampa">
            <connectionWD id="0" preCellId="../L6_IPC/10/hhcell" postCellId="../L6_UTPC/0/hhcell" weight="1." delay="1ms"/>
            <connectionWD id="1" preCellId="../L6_IPC/20/hhcell" postCellId="../L6_UTPC/15/hhcell" weight="1." delay="1ms"/>
            <connectionWD id="2" preCellId="../L6_IPC/28/hhcell" postCellId="../L6_UTPC/13/hhcell" weight="1." delay="1ms"/>
        </projection>
        <projection id="Proj__L6_LBC__L5_TTPC1" presynapticPopulation="L6_LBC" postsynapticPopulation="L5_TTPC1" synapse="gaba">
            <connectionWD id="0" preCellId="../L6_LBC/2/hhcell" postCellId="../L5_TTPC1/16/hhcell" weight="1." delay="1ms"/>
        </projection>
        <projection id="Proj__L6_LBC__L5_TTPC2" presynapticPopulation="L6_LBC" postsynapticPopulation="L5_TTPC2" synapse="gaba">
            <connectionWD id="0" preCellId="../L6_LBC/0/hhcell" postCellId="../L5_TTPC2/6/hhcell" weight="1." delay="1ms"/>
        </projection>
        <projection id="Proj__L6_LBC__L6_BPC" presynapticPopulation="L6_LBC" postsynapticPopulation="L6_BPC" synapse="gaba">
            <connectionWD id="0" preCellId="../L6_LBC/1/hhcell" postCellId="../L6_BPC/5/hhcell" weight="1." delay="1ms"/>
        </projection>
        <projection id="Proj__L6_LBC__L6_IPC" presynapticPopulation="L6_LBC" postsynapticPopulation="L6_IPC" synapse="gaba">
            <connectionWD id="0" preCellId="../L6_LBC/2/hhcell" postCellId="../L6_IPC/0/hhcell" weight="1." delay="1ms"/>
        </projection>
        <projection id="Proj__L6_LBC__L6_TPC_L1" presynapticPopulation="L6_LBC" postsynapticPopulation="L6_TPC_L1" synapse="gaba">
            <connectionWD id="0" preCellId="../L6_LBC/2/hhcell" postCellId="../L6_TPC_L1/0/hhcell" weight="1." delay="1ms"/>
            <connectionWD id="1" preCellId="../L6_LBC/2/hhcell" postCellId="../L6_TPC_L1/8/hhcell" weight="1." delay="1ms"/>
        </projection>
        <projection id="Proj__L6_LBC__L6_TPC_L4" presynapticPopulation="L6_LBC" postsynapticPopulation="L6_TPC_L4" synapse="gaba">
            <connectionWD id="0" preCellId="../L6_LBC/2/hhcell" postCellId="../L6_TPC_L4/11/hhcell" weight="1." delay="1ms"/>
        </projection>
        <projection id="Proj__L6_MC__L4_PC" presynapticPopulation="L6_MC" postsynapticPopulation="L4_PC" synapse="gaba">
            <connectionWD id="0" preCellId="../L6_MC/1/hhcell" postCellId="../L4_PC/2/hhcell" weight="1." delay="1ms"/>
            <connectionWD id="1" preCellId="../L6_MC/1/hhcell" postCellId="../L4_PC/10/hhcell" weight="1." delay="1ms"/>
        </projection>
        <projection id="Proj__L6_MC__L4_SP" presynapticPopulation="L6_MC" postsynapticPopulation="L4_SP" synapse="gaba">
            <connectionWD id="0" preCellId="../L6_MC/1/hhcell" postCellId="../L4_SP/3/hhcell" weight="1." delay="1ms"/>
        </projection>
        <projection id="Proj__L6_MC__L5_TTPC1" presynapticPopulation="L6_MC" postsynapticPopulation="L5_TTPC1" synapse="gaba">
            <connectionWD id="0" preCellId="../L6_MC/1/hhcell" postCellId="../L5_TTPC1/2/hhcell" weight="1." delay="1ms"/>
            <connectionWD id="1" preCellId="../L6_MC/1/hhcell" postCellId="../L5_TTPC1/16/hhcell" weight="1." delay="1ms"/>
        </projection>
        <projection id="Proj__L6_MC__L6_BPC" presynapticPopulation="L6_MC" postsynapticPopulation="L6_BPC" synapse="gaba">
            <connectionWD id="0" preCellId="../L6_MC/1/hhcell" postCellId="../L6_BPC/22/hhcell" weight="1." delay="1ms"/>
        </projection>
        <projection id="Proj__L6_MC__L6_TPC_L1" presynapticPopulation="L6_MC" postsynapticPopulation="L6_TPC_L1" synapse="gaba">
            <connectionWD id="0" preCellId="../L6_MC/1/hhcell" postCellId="../L6_TPC_L1/2/hhcell" weight="1." delay="1ms"/>
        </projection>
        <projection id="Proj__L6_MC__L6_UTPC" presynapticPopulation="L6_MC" postsynapticPopulation="L6_UTPC" synapse="gaba">
            <connectionWD id="0" preCellId="../L6_MC/1/hhcell" postCellId="../L6_UTPC/15/hhcell" weight="1." delay="1ms"/>
        </projection>
        <projection id="Proj__L6_NBC__L6_MC" presynapticPopulation="L6_NBC" postsynapticPopulation="L6_MC" synapse="gaba">
            <connectionWD id="0" preCellId="../L6_NBC/0/hhcell" postCellId="../L6_MC/1/hhcell" weight="1." delay="1ms"/>
        </projection>
        <projection id="Proj__L6_NBC__L6_UTPC" presynapticPopulation="L6_NBC" postsynapticPopulation="L6_UTPC" synapse="gaba">
            <connectionWD id="0" preCellId="../L6_NBC/0/hhcell" postCellId="../L6_UTPC/15/hhcell" weight="1." delay="1ms"/>
        </projection>
        <projection id="Proj__L6_TPC_L1__L4_PC" presynapticPopulation="L6_TPC_L1" postsynapticPopulation="L4_PC" synapse="ampa">
            <connectionWD id="0" preCellId="../L6_TPC_L1/4/hhcell" postCellId="../L4_PC/13/hhcell" weight="1." delay="1ms"/>
        </projection>
        <projection id="Proj__L6_TPC_L1__L5_MC" presynapticPopulation="L6_TPC_L1" postsynapticPopulation="L5_MC" synapse="ampa">
            <connectionWD id="0" preCellId="../L6_TPC_L1/8/hhcell" postCellId="../L5_MC/2/hhcell" weight="1." delay="1ms"/>
        </projection>
        <projection id="Proj__L6_TPC_L1__L5_TTPC1" presynapticPopulation="L6_TPC_L1" postsynapticPopulation="L5_TTPC1" synapse="ampa">
            <connectionWD id="0" preCellId="../L6_TPC_L1/3/hhcell" postCellId="../L5_TTPC1/21/hhcell" weight="1." delay="1ms"/>
            <connectionWD id="1" preCellId="../L6_TPC_L1/4/hhcell" postCellId="../L5_TTPC1/7/hhcell" weight="1." delay="1ms"/>
            <connectionWD id="2" preCellId="../L6_TPC_L1/5/hhcell" postCellId="../L5_TTPC1/16/hhcell" weight="1." delay="1ms"/>
            <connectionWD id="3" preCellId="../L6_TPC_L1/12/hhcell" postCellId="../L5_TTPC1/19/hhcell" weight="1." delay="1ms"/>
        </projection>
        <projection id="Proj__L6_TPC_L1__L5_TTPC2" presynapticPopulation="L6_TPC_L1" postsynapticPopulation="L5_TTPC2" synapse="ampa">
            <connectionWD id="0" preCellId="../L6_TPC_L1/1/hhcell" postCellId="../L5_TTPC2/1/hhcell" weight="1." delay="1ms"/>
            <connectionWD id="1" preCellId="../L6_TPC_L1/1/hhcell" postCellId="../L5_TTPC2/4/hhcell" weight="1." delay="1ms"/>
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        </projection>
        <projection id="Proj__L6_TPC_L1__L5_UTPC" presynapticPopulation="L6_TPC_L1" postsynapticPopulation="L5_UTPC" synapse="ampa">
            <connectionWD id="0" preCellId="../L6_TPC_L1/1/hhcell" postCellId="../L5_UTPC/1/hhcell" weight="1." delay="1ms"/>
        </projection>
        <projection id="Proj__L6_TPC_L1__L6_BPC" presynapticPopulation="L6_TPC_L1" postsynapticPopulation="L6_BPC" synapse="ampa">
            <connectionWD id="0" preCellId="../L6_TPC_L1/2/hhcell" postCellId="../L6_BPC/21/hhcell" weight="1." delay="1ms"/>
            <connectionWD id="1" preCellId="../L6_TPC_L1/3/hhcell" postCellId="../L6_BPC/2/hhcell" weight="1." delay="1ms"/>
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        </projection>
        <projection id="Proj__L6_TPC_L1__L6_IPC" presynapticPopulation="L6_TPC_L1" postsynapticPopulation="L6_IPC" synapse="ampa">
            <connectionWD id="0" preCellId="../L6_TPC_L1/0/hhcell" postCellId="../L6_IPC/1/hhcell" weight="1." delay="1ms"/>
            <connectionWD id="1" preCellId="../L6_TPC_L1/1/hhcell" postCellId="../L6_IPC/6/hhcell" weight="1." delay="1ms"/>
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        </projection>
        <projection id="Proj__L6_TPC_L1__L6_TPC_L1" presynapticPopulation="L6_TPC_L1" postsynapticPopulation="L6_TPC_L1" synapse="ampa">
            <connectionWD id="0" preCellId="../L6_TPC_L1/2/hhcell" postCellId="../L6_TPC_L1/5/hhcell" weight="1." delay="1ms"/>
            <connectionWD id="1" preCellId="../L6_TPC_L1/5/hhcell" postCellId="../L6_TPC_L1/0/hhcell" weight="1." delay="1ms"/>
        </projection>
        <projection id="Proj__L6_TPC_L1__L6_TPC_L4" presynapticPopulation="L6_TPC_L1" postsynapticPopulation="L6_TPC_L4" synapse="ampa">
            <connectionWD id="0" preCellId="../L6_TPC_L1/0/hhcell" postCellId="../L6_TPC_L4/10/hhcell" weight="1." delay="1ms"/>
            <connectionWD id="1" preCellId="../L6_TPC_L1/4/hhcell" postCellId="../L6_TPC_L4/13/hhcell" weight="1." delay="1ms"/>
            <connectionWD id="2" preCellId="../L6_TPC_L1/13/hhcell" postCellId="../L6_TPC_L4/2/hhcell" weight="1." delay="1ms"/>
        </projection>
        <projection id="Proj__L6_TPC_L1__L6_UTPC" presynapticPopulation="L6_TPC_L1" postsynapticPopulation="L6_UTPC" synapse="ampa">
            <connectionWD id="0" preCellId="../L6_TPC_L1/1/hhcell" postCellId="../L6_UTPC/3/hhcell" weight="1." delay="1ms"/>
            <connectionWD id="1" preCellId="../L6_TPC_L1/4/hhcell" postCellId="../L6_UTPC/0/hhcell" weight="1." delay="1ms"/>
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        </projection>
        <projection id="Proj__L6_TPC_L4__L5_TTPC1" presynapticPopulation="L6_TPC_L4" postsynapticPopulation="L5_TTPC1" synapse="ampa">
            <connectionWD id="0" preCellId="../L6_TPC_L4/0/hhcell" postCellId="../L5_TTPC1/15/hhcell" weight="1." delay="1ms"/>
            <connectionWD id="1" preCellId="../L6_TPC_L4/4/hhcell" postCellId="../L5_TTPC1/20/hhcell" weight="1." delay="1ms"/>
        </projection>
        <projection id="Proj__L6_TPC_L4__L5_TTPC2" presynapticPopulation="L6_TPC_L4" postsynapticPopulation="L5_TTPC2" synapse="ampa">
            <connectionWD id="0" preCellId="../L6_TPC_L4/9/hhcell" postCellId="../L5_TTPC2/3/hhcell" weight="1." delay="1ms"/>
        </projection>
        <projection id="Proj__L6_TPC_L4__L6_BPC" presynapticPopulation="L6_TPC_L4" postsynapticPopulation="L6_BPC" synapse="ampa">
            <connectionWD id="0" preCellId="../L6_TPC_L4/2/hhcell" postCellId="../L6_BPC/19/hhcell" weight="1." delay="1ms"/>
            <connectionWD id="1" preCellId="../L6_TPC_L4/3/hhcell" postCellId="../L6_BPC/19/hhcell" weight="1." delay="1ms"/>
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        </projection>
        <projection id="Proj__L6_TPC_L4__L6_IPC" presynapticPopulation="L6_TPC_L4" postsynapticPopulation="L6_IPC" synapse="ampa">
            <connectionWD id="0" preCellId="../L6_TPC_L4/0/hhcell" postCellId="../L6_IPC/10/hhcell" weight="1." delay="1ms"/>
            <connectionWD id="1" preCellId="../L6_TPC_L4/7/hhcell" postCellId="../L6_IPC/8/hhcell" weight="1." delay="1ms"/>
            <connectionWD id="2" preCellId="../L6_TPC_L4/11/hhcell" postCellId="../L6_IPC/18/hhcell" weight="1." delay="1ms"/>
        </projection>
        <projection id="Proj__L6_TPC_L4__L6_TPC_L1" presynapticPopulation="L6_TPC_L4" postsynapticPopulation="L6_TPC_L1" synapse="ampa">
            <connectionWD id="0" preCellId="../L6_TPC_L4/8/hhcell" postCellId="../L6_TPC_L1/10/hhcell" weight="1." delay="1ms"/>
            <connectionWD id="1" preCellId="../L6_TPC_L4/11/hhcell" postCellId="../L6_TPC_L1/11/hhcell" weight="1." delay="1ms"/>
            <connectionWD id="2" preCellId="../L6_TPC_L4/13/hhcell" postCellId="../L6_TPC_L1/15/hhcell" weight="1." delay="1ms"/>
        </projection>
        <projection id="Proj__L6_TPC_L4__L6_TPC_L4" presynapticPopulation="L6_TPC_L4" postsynapticPopulation="L6_TPC_L4" synapse="ampa">
            <connectionWD id="0" preCellId="../L6_TPC_L4/3/hhcell" postCellId="../L6_TPC_L4/7/hhcell" weight="1." delay="1ms"/>
            <connectionWD id="1" preCellId="../L6_TPC_L4/8/hhcell" postCellId="../L6_TPC_L4/9/hhcell" weight="1." delay="1ms"/>
        </projection>
        <projection id="Proj__L6_TPC_L4__L6_UTPC" presynapticPopulation="L6_TPC_L4" postsynapticPopulation="L6_UTPC" synapse="ampa">
            <connectionWD id="0" preCellId="../L6_TPC_L4/1/hhcell" postCellId="../L6_UTPC/8/hhcell" weight="1." delay="1ms"/>
            <connectionWD id="1" preCellId="../L6_TPC_L4/4/hhcell" postCellId="../L6_UTPC/15/hhcell" weight="1." delay="1ms"/>
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        </projection>
        <projection id="Proj__L6_UTPC__L23_PC" presynapticPopulation="L6_UTPC" postsynapticPopulation="L23_PC" synapse="ampa">
            <connectionWD id="0" preCellId="../L6_UTPC/8/hhcell" postCellId="../L23_PC/24/hhcell" weight="1." delay="1ms"/>
        </projection>
        <projection id="Proj__L6_UTPC__L4_PC" presynapticPopulation="L6_UTPC" postsynapticPopulation="L4_PC" synapse="ampa">
            <connectionWD id="0" preCellId="../L6_UTPC/1/hhcell" postCellId="../L4_PC/4/hhcell" weight="1." delay="1ms"/>
        </projection>
        <projection id="Proj__L6_UTPC__L4_SP" presynapticPopulation="L6_UTPC" postsynapticPopulation="L4_SP" synapse="ampa">
            <connectionWD id="0" preCellId="../L6_UTPC/14/hhcell" postCellId="../L4_SP/3/hhcell" weight="1." delay="1ms"/>
        </projection>
        <projection id="Proj__L6_UTPC__L5_MC" presynapticPopulation="L6_UTPC" postsynapticPopulation="L5_MC" synapse="ampa">
            <connectionWD id="0" preCellId="../L6_UTPC/2/hhcell" postCellId="../L5_MC/0/hhcell" weight="1." delay="1ms"/>
        </projection>
        <projection id="Proj__L6_UTPC__L5_STPC" presynapticPopulation="L6_UTPC" postsynapticPopulation="L5_STPC" synapse="ampa">
            <connectionWD id="0" preCellId="../L6_UTPC/10/hhcell" postCellId="../L5_STPC/1/hhcell" weight="1." delay="1ms"/>
        </projection>
        <projection id="Proj__L6_UTPC__L5_TTPC1" presynapticPopulation="L6_UTPC" postsynapticPopulation="L5_TTPC1" synapse="ampa">
            <connectionWD id="0" preCellId="../L6_UTPC/1/hhcell" postCellId="../L5_TTPC1/3/hhcell" weight="1." delay="1ms"/>
            <connectionWD id="1" preCellId="../L6_UTPC/1/hhcell" postCellId="../L5_TTPC1/18/hhcell" weight="1." delay="1ms"/>
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        </projection>
        <projection id="Proj__L6_UTPC__L5_TTPC2" presynapticPopulation="L6_UTPC" postsynapticPopulation="L5_TTPC2" synapse="ampa">
            <connectionWD id="0" preCellId="../L6_UTPC/1/hhcell" postCellId="../L5_TTPC2/17/hhcell" weight="1." delay="1ms"/>
            <connectionWD id="1" preCellId="../L6_UTPC/4/hhcell" postCellId="../L5_TTPC2/6/hhcell" weight="1." delay="1ms"/>
        </projection>
        <projection id="Proj__L6_UTPC__L5_UTPC" presynapticPopulation="L6_UTPC" postsynapticPopulation="L5_UTPC" synapse="ampa">
            <connectionWD id="0" preCellId="../L6_UTPC/8/hhcell" postCellId="../L5_UTPC/2/hhcell" weight="1." delay="1ms"/>
        </projection>
        <projection id="Proj__L6_UTPC__L6_BPC" presynapticPopulation="L6_UTPC" postsynapticPopulation="L6_BPC" synapse="ampa">
            <connectionWD id="0" preCellId="../L6_UTPC/0/hhcell" postCellId="../L6_BPC/0/hhcell" weight="1." delay="1ms"/>
            <connectionWD id="1" preCellId="../L6_UTPC/1/hhcell" postCellId="../L6_BPC/4/hhcell" weight="1." delay="1ms"/>
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        </projection>
        <projection id="Proj__L6_UTPC__L6_IPC" presynapticPopulation="L6_UTPC" postsynapticPopulation="L6_IPC" synapse="ampa">
            <connectionWD id="0" preCellId="../L6_UTPC/0/hhcell" postCellId="../L6_IPC/26/hhcell" weight="1." delay="1ms"/>
            <connectionWD id="1" preCellId="../L6_UTPC/1/hhcell" postCellId="../L6_IPC/22/hhcell" weight="1." delay="1ms"/>
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        </projection>
        <projection id="Proj__L6_UTPC__L6_MC" presynapticPopulation="L6_UTPC" postsynapticPopulation="L6_MC" synapse="ampa">
            <connectionWD id="0" preCellId="../L6_UTPC/1/hhcell" postCellId="../L6_MC/0/hhcell" weight="1." delay="1ms"/>
        </projection>
        <projection id="Proj__L6_UTPC__L6_TPC_L1" presynapticPopulation="L6_UTPC" postsynapticPopulation="L6_TPC_L1" synapse="ampa">
            <connectionWD id="0" preCellId="../L6_UTPC/0/hhcell" postCellId="../L6_TPC_L1/0/hhcell" weight="1." delay="1ms"/>
            <connectionWD id="1" preCellId="../L6_UTPC/0/hhcell" postCellId="../L6_TPC_L1/1/hhcell" weight="1." delay="1ms"/>
            <connectionWD id="2" preCellId="../L6_UTPC/4/hhcell" postCellId="../L6_TPC_L1/13/hhcell" weight="1." delay="1ms"/>
            <connectionWD id="3" preCellId="../L6_UTPC/8/hhcell" postCellId="../L6_TPC_L1/15/hhcell" weight="1." delay="1ms"/>
        </projection>
        <projection id="Proj__L6_UTPC__L6_TPC_L4" presynapticPopulation="L6_UTPC" postsynapticPopulation="L6_TPC_L4" synapse="ampa">
            <connectionWD id="0" preCellId="../L6_UTPC/4/hhcell" postCellId="../L6_TPC_L4/1/hhcell" weight="1." delay="1ms"/>
            <connectionWD id="1" preCellId="../L6_UTPC/8/hhcell" postCellId="../L6_TPC_L4/7/hhcell" weight="1." delay="1ms"/>
            <connectionWD id="2" preCellId="../L6_UTPC/11/hhcell" postCellId="../L6_TPC_L4/13/hhcell" weight="1." delay="1ms"/>
        </projection>
        <projection id="Proj__L6_UTPC__L6_UTPC" presynapticPopulation="L6_UTPC" postsynapticPopulation="L6_UTPC" synapse="ampa">
            <connectionWD id="0" preCellId="../L6_UTPC/11/hhcell" postCellId="../L6_UTPC/8/hhcell" weight="1." delay="1ms"/>
        </projection>
        <inputList id="stim_L23_PC" population="L23_PC" component="iclamp0">
            <input id="0" target="../L23_PC/1/hhcell" destination="synapses"/>
            <input id="0" target="../L23_PC/2/hhcell" destination="synapses"/>
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        </inputList>
    </network>
</neuroml>
