<Lems>

    <!--

        This LEMS file has been automatically generated using PyNeuroML v0.1.2 (libNeuroML v0.2.9)

     -->

    <!-- Specify which component to run -->
    <Target component="L1_HAC_cNAC187_1"/>

    <!-- Include core NeuroML2 ComponentType definitions -->
    <Include file="Cells.xml"/>
    <Include file="Networks.xml"/>
    <Include file="Simulation.xml"/>

    <Include file="cNAC187_L1_HAC_f8c9772d9d.net.nml"/>
    <Include file="cNAC187_L1_HAC_f8c9772d9d_0_0.cell.nml"/>
    <Include file="K_Tst.channel.nml"/>
    <Include file="SKv3_1.channel.nml"/>
    <Include file="Nap_Et2.channel.nml"/>
    <Include file="NaTs2_t.channel.nml"/>
    <Include file="pas.channel.nml"/>
    <Include file="Im.channel.nml"/>
    <Include file="NaTa_t.channel.nml"/>
    <Include file="SK_E2.channel.nml"/>
    <Include file="K_Pst.channel.nml"/>
    <Include file="CaDynamics_E2_NML2.nml"/>

    <Simulation id="L1_HAC_cNAC187_1" length="3000ms" step="0.025ms" target="network">

        <Display id="DispPop__Pop_cNAC187_L1_HAC_f8c9772d9d_0_0" title="Voltages of DispPop__Pop_cNAC187_L1_HAC_f8c9772d9d_0_0" timeScale="1ms" xmin="-300.0" xmax="3300.0" ymin="-90" ymax="50">
            <Line id="v Pop_cNAC187_L1_HAC_f8c9772d9d_0_0_0__v" quantity="Pop_cNAC187_L1_HAC_f8c9772d9d_0_0[0]/v" scale="1mV" color="#40b64e" timeScale="1ms"/>
        </Display>

        <OutputFile id="Volts_file__Pop_cNAC187_L1_HAC_f8c9772d9d_0_0" fileName="L1_HAC_cNAC187_1.Pop_cNAC187_L1_HAC_f8c9772d9d_0_0.v.dat">
            <OutputColumn id="v_Pop_cNAC187_L1_HAC_f8c9772d9d_0_0_0__v" quantity="Pop_cNAC187_L1_HAC_f8c9772d9d_0_0[0]/v"/>
        </OutputFile>

    </Simulation>

</Lems>
