<neuroml xmlns="http://www.neuroml.org/schema/neuroml2"  xmlns:xs="http://www.w3.org/2001/XMLSchema" xmlns:xsi="http://www.w3.org/2001/XMLSchema-instance" xsi:schemaLocation="http://www.neuroml.org/schema/neuroml2 https://raw.github.com/NeuroML/NeuroML2/development/Schemas/NeuroML2/NeuroML_v2beta4.xsd" id="NeuroML2_file_exported_from_NEURON">
    <notes> NeuroML 2 file generated from ModelView by: NEURON -- VERSION 7.3 ansi (1078:2b0c984183df) 2014-04-04
          Authors: Michael Hines, Sushil Kambampati and Padraig Gleeson,
          Yale University and UCL
  </notes>
    <include href="K_Tst.channel.nml"></include>
    <include href="SKv3_1.channel.nml"></include>
    <include href="Nap_Et2.channel.nml"></include>
    <include href="NaTs2_t.channel.nml"></include>
    <include href="pas.channel.nml"></include>
    <include href="Im.channel.nml"></include>
    <include href="NaTa_t.channel.nml"></include>
    <include href="SK_E2.channel.nml"></include>
    <include href="K_Pst.channel.nml"></include>
    <include href="CaDynamics_E2_NML2.nml"></include>
    <cell id="cNAC187_L1_HAC_f8c9772d9d_0_0">
        <notes>Cell: cNAC187_L1_HAC_f8c9772d9d_0_0 exported from NEURON ModelView

****************************
*
*  This export to NeuroML2 has not yet been fully validated!!
*  Use with caution!!
*
****************************

</notes>
        <morphology id="morphology">
            <segment id="0" name="Seg0_soma_0">
                <proximal y="-7.565470e+00" x="-3.809550e+00" z="0.000000e+00" diameter="2.788280e+00"/>
                <distal y="-6.800010e+00" x="-3.433180e+00" z="0.000000e+00" diameter="4.909280e+00"/>
            </segment>
            <segment id="2" name="Seg1_soma_0">
                <parent fractionAlong="1" segment="0"/>
                <distal y="-6.034560e+00" x="-3.056810e+00" z="0.000000e+00" diameter="7.205390e+00"/>
            </segment>
            <segment id="3" name="Seg2_soma_0">
                <parent fractionAlong="1" segment="2"/>
                <distal y="-5.269100e+00" x="-2.680440e+00" z="0.000000e+00" diameter="8.945170e+00"/>
            </segment>
            <segment id="4" name="Seg3_soma_0">
                <parent fractionAlong="1" segment="3"/>
                <distal y="-4.503650e+00" x="-2.304070e+00" z="0.000000e+00" diameter="1.025270e+01"/>
            </segment>
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            <segmentGroup neuroLexId="sao864921383" id="soma_0">
                <member segment="0"/>
                <member segment="2"/>
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            </segmentGroup>
            <segmentGroup neuroLexId="sao864921383" id="dend_32">
                <member segment="1320"/>
                <member segment="1321"/>
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            </segmentGroup>
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            <segmentGroup id="all">
                <include segmentGroup="soma_0"/>
                <include segmentGroup="dend_32"/>
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            </segmentGroup>
            <segmentGroup id="ModelViewParmSubset_1">
                <include segmentGroup="soma_0"/>
                <include segmentGroup="axon_0"/>
                <include segmentGroup="axon_1"/>
            </segmentGroup>
            <segmentGroup id="ModelViewParmSubset_2">
                <include segmentGroup="dend_32"/>
                <include segmentGroup="dend_19"/>
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            </segmentGroup>
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            <segmentGroup id="basal">
                <include segmentGroup="dend_0"/>
                <include segmentGroup="dend_1"/>
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            </segmentGroup>
            <segmentGroup id="apical"/>
            <segmentGroup id="axonal">
                <include segmentGroup="axon_0"/>
                <include segmentGroup="axon_1"/>
            </segmentGroup>
            <segmentGroup id="somatic">
                <include segmentGroup="soma_0"/>
            </segmentGroup>
        </morphology>
        <biophysicalProperties id="biophys">
            <membraneProperties>
                <channelDensity id="basal_gK_Tstbar_K_Tst" segmentGroup="basal" ion="k" ionChannel="K_Tst" erev="-85.0 mV" condDensity="0.009500 mS_per_cm2"/>
                <channelDensity id="basal_gSKv3_1bar_SKv3_1" segmentGroup="basal" ion="k" ionChannel="SKv3_1" erev="-85.0 mV" condDensity="0.004399 mS_per_cm2"/>
                <channelDensity id="basal_gNap_Et2bar_Nap_Et2" segmentGroup="basal" ion="na" ionChannel="Nap_Et2" erev="50.0 mV" condDensity="0.000001 mS_per_cm2"/>
                <channelDensity id="basal_gNaTs2_tbar_NaTs2_t" segmentGroup="basal" ion="na" ionChannel="NaTs2_t" erev="50.0 mV" condDensity="0.000010 mS_per_cm2"/>
                <channelDensity id="basal_g_pas" segmentGroup="basal" ion="non_specific" ionChannel="pas" erev="-79.315740 mV" condDensity="0.000001 mS_per_cm2"/>
                <channelDensity id="basal_gImbar_Im" segmentGroup="basal" ion="k" ionChannel="Im" erev="-85.0 mV" condDensity="0.000008 mS_per_cm2"/>
                <channelDensity id="apical_gK_Tstbar_K_Tst" segmentGroup="apical" ion="k" ionChannel="K_Tst" erev="-85.0 mV" condDensity="0.009500 mS_per_cm2"/>
                <channelDensity id="apical_gSKv3_1bar_SKv3_1" segmentGroup="apical" ion="k" ionChannel="SKv3_1" erev="-85.0 mV" condDensity="0.004399 mS_per_cm2"/>
                <channelDensity id="apical_gNap_Et2bar_Nap_Et2" segmentGroup="apical" ion="na" ionChannel="Nap_Et2" erev="50.0 mV" condDensity="0.000001 mS_per_cm2"/>
                <channelDensity id="apical_gNaTs2_tbar_NaTs2_t" segmentGroup="apical" ion="na" ionChannel="NaTs2_t" erev="50.0 mV" condDensity="0.000010 mS_per_cm2"/>
                <channelDensity id="apical_g_pas" segmentGroup="apical" ion="non_specific" ionChannel="pas" erev="-79.315740 mV" condDensity="0.000001 mS_per_cm2"/>
                <channelDensity id="apical_gImbar_Im" segmentGroup="apical" ion="k" ionChannel="Im" erev="-85.0 mV" condDensity="0.000008 mS_per_cm2"/>
                <channelDensity id="axonal_gNaTa_tbar_NaTa_t" segmentGroup="axonal" ion="na" ionChannel="NaTa_t" erev="50.0 mV" condDensity="3.959764 mS_per_cm2"/>
                <channelDensity id="axonal_gK_Tstbar_K_Tst" segmentGroup="axonal" ion="k" ionChannel="K_Tst" erev="-85.0 mV" condDensity="0.098908 mS_per_cm2"/>
                <channelDensity id="axonal_gNap_Et2bar_Nap_Et2" segmentGroup="axonal" ion="na" ionChannel="Nap_Et2" erev="50.0 mV" condDensity="0.000000 mS_per_cm2"/>
                <channelDensity id="axonal_gSK_E2bar_SK_E2" segmentGroup="axonal" ion="k" ionChannel="SK_E2" erev="-85.0 mV" condDensity="0.003442 mS_per_cm2"/>
                <channelDensity id="axonal_gK_Pstbar_K_Pst" segmentGroup="axonal" ion="k" ionChannel="K_Pst" erev="-85.0 mV" condDensity="0.004729 mS_per_cm2"/>
                <channelDensity id="axonal_gSKv3_1bar_SKv3_1" segmentGroup="axonal" ion="k" ionChannel="SKv3_1" erev="-85.0 mV" condDensity="0.317363 mS_per_cm2"/>
                <channelDensity id="axonal_g_pas" segmentGroup="axonal" ion="non_specific" ionChannel="pas" erev="-60.216510 mV" condDensity="0.000094 mS_per_cm2"/>
                <channelDensity id="axonal_gImbar_Im" segmentGroup="axonal" ion="k" ionChannel="Im" erev="-85.0 mV" condDensity="0.000999 mS_per_cm2"/>
                <channelDensity id="somatic_gK_Tstbar_K_Tst" segmentGroup="somatic" ion="k" ionChannel="K_Tst" erev="-85.0 mV" condDensity="0.092965 mS_per_cm2"/>
                <channelDensity id="somatic_gNap_Et2bar_Nap_Et2" segmentGroup="somatic" ion="na" ionChannel="Nap_Et2" erev="50.0 mV" condDensity="0.000001 mS_per_cm2"/>
                <channelDensity id="somatic_gSK_E2bar_SK_E2" segmentGroup="somatic" ion="k" ionChannel="SK_E2" erev="-85.0 mV" condDensity="0.019726 mS_per_cm2"/>
                <channelDensity id="somatic_gK_Pstbar_K_Pst" segmentGroup="somatic" ion="k" ionChannel="K_Pst" erev="-85.0 mV" condDensity="0.156376 mS_per_cm2"/>
                <channelDensity id="somatic_gSKv3_1bar_SKv3_1" segmentGroup="somatic" ion="k" ionChannel="SKv3_1" erev="-85.0 mV" condDensity="0.297559 mS_per_cm2"/>
                <channelDensity id="somatic_g_pas" segmentGroup="somatic" ion="non_specific" ionChannel="pas" erev="-62.442793 mV" condDensity="0.000091 mS_per_cm2"/>
                <channelDensity id="somatic_gImbar_Im" segmentGroup="somatic" ion="k" ionChannel="Im" erev="-85.0 mV" condDensity="0.000008 mS_per_cm2"/>
                <channelDensity id="somatic_gNaTs2_tbar_NaTs2_t" segmentGroup="somatic" ion="na" ionChannel="NaTs2_t" erev="50.0 mV" condDensity="0.197999 mS_per_cm2"/>
                <specificCapacitance segmentGroup="basal" value="1.0 uF_per_cm2"/>
                <specificCapacitance segmentGroup="apical" value="1.0 uF_per_cm2"/>
                <specificCapacitance segmentGroup="axonal" value="1.0 uF_per_cm2"/>
                <specificCapacitance segmentGroup="somatic" value="1.0 uF_per_cm2"/>
                <initMembPotential segmentGroup="all" value="-65 mV"/>
            </membraneProperties>
            <intracellularProperties>
                <species segmentGroup="axonal" ion="ca" initialExtConcentration="1.0E-4 mM" concentrationModel="CaDynamics_E2_NML2" id="ca" initialConcentration="1.0E-4 mM"/>
                <species segmentGroup="somatic" ion="ca" initialExtConcentration="1.0E-4 mM" concentrationModel="CaDynamics_E2_NML2" id="ca" initialConcentration="1.0E-4 mM"/>
                <resistivity segmentGroup="all" value="1 ohm_cm"/>
            </intracellularProperties>
        </biophysicalProperties>
    </cell>
    <network id="network" type="networkWithTemperature" temperature="34 degC">
        <population id="Pop_cNAC187_L1_HAC_f8c9772d9d_0_0" component="cNAC187_L1_HAC_f8c9772d9d_0_0" size="1"/>
    </network>
</neuroml>
