<neuroml xmlns="http://www.neuroml.org/schema/neuroml2"  xmlns:xs="http://www.w3.org/2001/XMLSchema" xmlns:xsi="http://www.w3.org/2001/XMLSchema-instance" xsi:schemaLocation="http://www.neuroml.org/schema/neuroml2 https://raw.github.com/NeuroML/NeuroML2/development/Schemas/NeuroML2/NeuroML_v2beta4.xsd" id="NeuroML2_file_exported_from_NEURON">
    <notes> NeuroML 2 file generated from ModelView by: NEURON -- Release 7.2 (551:9d708f513f8c) 2011-11-22
          Authors: Michael Hines, Sushil Kambampati and Padraig Gleeson,
          Yale University and UCL
  </notes>
    <include href="cNAC187_L1_HAC_f8c9772d9d_0_0.cell.nml"></include>
    <pulseGenerator id="stepcurrent3_hyp" delay="0ms" duration="3000ms" amplitude="-0.025513nA"/>
    <pulseGenerator id="stepcurrent3" delay="700ms" duration="2000ms" amplitude="0.0665952nA"/>
    <network id="network" type="networkWithTemperature" temperature="34 degC">
        <population id="Pop_cNAC187_L1_HAC_f8c9772d9d_0_0" type="populationList" component="cNAC187_L1_HAC_f8c9772d9d_0_0" size="1">
            <instance id="0">
                <location y="0." x="0." z="0."/>
            </instance>
        </population>
        <inputList id="stepcurrent3_hyp_input" component="stepcurrent3_hyp" population="Pop_cNAC187_L1_HAC_f8c9772d9d_0_0">
            <input destination="synapses" id="0" target="../Pop_cNAC187_L1_HAC_f8c9772d9d_0_0/0/cNAC187_L1_HAC_f8c9772d9d_0_0"/>
        </inputList>
        <inputList id="stepcurrent3_input" component="stepcurrent3" population="Pop_cNAC187_L1_HAC_f8c9772d9d_0_0">
            <input destination="synapses" id="0" target="../Pop_cNAC187_L1_HAC_f8c9772d9d_0_0/0/cNAC187_L1_HAC_f8c9772d9d_0_0"/>
        </inputList>
    </network>
</neuroml>
