<neuroml xmlns="http://www.neuroml.org/schema/neuroml2"  xmlns:xs="http://www.w3.org/2001/XMLSchema" xmlns:xsi="http://www.w3.org/2001/XMLSchema-instance" xsi:schemaLocation="http://www.neuroml.org/schema/neuroml2 https://raw.github.com/NeuroML/NeuroML2/development/Schemas/NeuroML2/NeuroML_v2beta5.xsd" id="NeuroML2_file_exported_from_NEURON">
    <include href="K_Tst.channel.nml"></include>
    <include href="SKv3_1.channel.nml"></include>
    <include href="StochKv_deterministic.channel.nml"></include>
    <include href="Nap_Et2.channel.nml"></include>
    <include href="NaTs2_t.channel.nml"></include>
    <include href="Ih.channel.nml"></include>
    <include href="pas.channel.nml"></include>
    <include href="Im.channel.nml"></include>
    <include href="NaTa_t.channel.nml"></include>
    <include href="Ca_LVAst.channel.nml"></include>
    <include href="SK_E2.channel.nml"></include>
    <include href="K_Pst.channel.nml"></include>
    <include href="CaDynamics_E2_NML2.nml"></include>
    <include href="Ca.channel.nml"></include>
    <cell id="cSTUT189_L23_LBC_e6e8f83407_0_0">
        <notes>

Export of a cell model obtained from the BBP NeocorticalMicrocircuit Collaboration Portal into NeuroML2

For more information on this cell model see: https://bbp.epfl.ch/nmc-portal/microcircuit#/metype/L23_LBC_cSTUT/details

******************************************************
*  This export to NeuroML2 has not yet been fully validated!!
*  Use with caution!!
******************************************************

        </notes>
        <property tag="BBP:layer" value="L3"/>
        <property tag="BBP:me-type" value="L23_LBC_cSTUT"/>
        <property tag="BBP:m-type" value="L23_LBC"/>
        <property tag="BBP:cell name" value="cSTUT189_L23_LBC_3_C050398B-I4_-_Scale_x1.000_y1.050_z1.000"/>
        <property tag="BBP:gid" value="162947"/>
        <property tag="BBP:e-type" value="cSTUT"/>
        <property tag="BBP:morphology" value="C050398B-I4_-_Scale_x1.000_y1.050_z1.000"/>
        <morphology id="morphology">
            <segment id="0" name="Seg0_soma_0">
                <proximal x="-2.563980e+00" y="1.218560e+01" z="-3.459150e+00" diameter="3.25378"/>
                <distal x="-2.267060e+00" y="1.096060e+01" z="-3.110580e+00" diameter="4.92468"/>
            </segment>
            <segment id="2" name="Seg1_soma_0">
                <parent segment="0" fractionAlong="1"/>
                <distal x="-1.970140e+00" y="9.735650e+00" z="-2.762020e+00" diameter="6.49677"/>
            </segment>
            <segment id="3" name="Seg2_soma_0">
                <parent segment="2" fractionAlong="1"/>
                <distal x="-1.673220e+00" y="8.510660e+00" z="-2.413450e+00" diameter="7.93038"/>
            </segment>
            <segment id="4" name="Seg3_soma_0">
                <parent segment="3" fractionAlong="1"/>
                <distal x="-1.376300e+00" y="7.285670e+00" z="-2.064880e+00" diameter="8.78195"/>
            </segment>
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            <segmentGroup neuroLexId="sao864921383" id="soma_0">
                <notes>This group contains an unbranched set of segments, and all of the segmentGroups marked with
             neuroLexId = sao864921383 form a non-overlapping set of all of the segments.
             These segmentGroups correspond to the 'cables' of NeuroML v1.8.1, and map to/from NEURON sections.</notes>
                <member segment="0"/>
                <member segment="2"/>
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            </segmentGroup>
            <segmentGroup neuroLexId="sao864921383" id="apic_0">
                <notes>This group contains an unbranched set of segments, and all of the segmentGroups marked with
             neuroLexId = sao864921383 form a non-overlapping set of all of the segments.
             These segmentGroups correspond to the 'cables' of NeuroML v1.8.1, and map to/from NEURON sections.</notes>
                <member segment="773"/>
                <member segment="774"/>
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            </segmentGroup>
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            <segmentGroup id="basal">
                <include segmentGroup="dend_0"/>
                <include segmentGroup="dend_1"/>
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                <inhomogeneousParameter id="PathLengthOver_basal" variable="p" metric="Path Length from root">
                    <proximal translationStart="0.000000e+00"/>
                </inhomogeneousParameter>
            </segmentGroup>
            <segmentGroup id="apical">
                <include segmentGroup="apic_0"/>
                <include segmentGroup="apic_1"/>
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                <inhomogeneousParameter id="PathLengthOver_apical" variable="p" metric="Path Length from root">
                    <proximal translationStart="0.000000e+00"/>
                </inhomogeneousParameter>
            </segmentGroup>
            <segmentGroup id="axonal">
                <include segmentGroup="axon_0"/>
                <include segmentGroup="axon_1"/>
            </segmentGroup>
            <segmentGroup id="somatic">
                <include segmentGroup="soma_0"/>
            </segmentGroup>
            <segmentGroup id="soma_group">
                <include segmentGroup="somatic"/>
            </segmentGroup>
            <segmentGroup id="axon_group">
                <include segmentGroup="axonal"/>
            </segmentGroup>
            <segmentGroup id="dendrite_group">
                <include segmentGroup="basal"/>
                <include segmentGroup="apical"/>
            </segmentGroup>
        </morphology>
        <biophysicalProperties id="biophys">
            <membraneProperties>
                <channelDensity id="basal_gK_Tstbar_K_Tst" ionChannel="K_Tst" condDensity="0.0095 S_per_cm2" erev="-85.0 mV" segmentGroup="basal" ion="k"/>
                <channelDensity id="basal_gSKv3_1bar_SKv3_1" ionChannel="SKv3_1" condDensity="0.004399 S_per_cm2" erev="-85.0 mV" segmentGroup="basal" ion="k"/>
                <channelDensity id="basal_gkbar_StochKv" ionChannel="StochKv_deterministic" condDensity="5.67935e-05 S_per_cm2" erev="-85.0 mV" segmentGroup="basal" ion="k"/>
                <channelDensity id="basal_gNap_Et2bar_Nap_Et2" ionChannel="Nap_Et2" condDensity="1e-06 S_per_cm2" erev="50.0 mV" segmentGroup="basal" ion="na"/>
                <channelDensity id="basal_gNaTs2_tbar_NaTs2_t" ionChannel="NaTs2_t" condDensity="1e-05 S_per_cm2" erev="50.0 mV" segmentGroup="basal" ion="na"/>
                <channelDensity id="basal_g_pas" ionChannel="pas" condDensity="1e-06 S_per_cm2" erev="-79.315740 mV" segmentGroup="basal" ion="non_specific"/>
                <channelDensity id="basal_gImbar_Im" ionChannel="Im" condDensity="8e-06 S_per_cm2" erev="-85.0 mV" segmentGroup="basal" ion="k"/>
                <channelDensity id="apical_gK_Tstbar_K_Tst" ionChannel="K_Tst" condDensity="0.0095 S_per_cm2" erev="-85.0 mV" segmentGroup="apical" ion="k"/>
                <channelDensity id="apical_gSKv3_1bar_SKv3_1" ionChannel="SKv3_1" condDensity="0.004399 S_per_cm2" erev="-85.0 mV" segmentGroup="apical" ion="k"/>
                <channelDensity id="apical_gkbar_StochKv" ionChannel="StochKv_deterministic" condDensity="5.67935e-05 S_per_cm2" erev="-85.0 mV" segmentGroup="apical" ion="k"/>
                <channelDensity id="apical_gNap_Et2bar_Nap_Et2" ionChannel="Nap_Et2" condDensity="1e-06 S_per_cm2" erev="50.0 mV" segmentGroup="apical" ion="na"/>
                <channelDensity id="apical_gNaTs2_tbar_NaTs2_t" ionChannel="NaTs2_t" condDensity="1e-05 S_per_cm2" erev="50.0 mV" segmentGroup="apical" ion="na"/>
                <channelDensity id="apical_g_pas" ionChannel="pas" condDensity="1e-06 S_per_cm2" erev="-79.315740 mV" segmentGroup="apical" ion="non_specific"/>
                <channelDensity id="apical_gImbar_Im" ionChannel="Im" condDensity="8e-06 S_per_cm2" erev="-85.0 mV" segmentGroup="apical" ion="k"/>
                <channelDensity id="axonal_gNaTa_tbar_NaTa_t" ionChannel="NaTa_t" condDensity="3.959764 S_per_cm2" erev="50.0 mV" segmentGroup="axonal" ion="na"/>
                <channelDensity id="axonal_gK_Tstbar_K_Tst" ionChannel="K_Tst" condDensity="0.098908 S_per_cm2" erev="-85.0 mV" segmentGroup="axonal" ion="k"/>
                <channelDensity id="axonal_gNap_Et2bar_Nap_Et2" ionChannel="Nap_Et2" condDensity="0.0 S_per_cm2" erev="50.0 mV" segmentGroup="axonal" ion="na"/>
                <channelDensity id="axonal_gSK_E2bar_SK_E2" ionChannel="SK_E2" condDensity="0.003442 S_per_cm2" erev="-85.0 mV" segmentGroup="axonal" ion="k"/>
                <channelDensity id="axonal_gK_Pstbar_K_Pst" ionChannel="K_Pst" condDensity="0.004729 S_per_cm2" erev="-85.0 mV" segmentGroup="axonal" ion="k"/>
                <channelDensity id="axonal_gSKv3_1bar_SKv3_1" ionChannel="SKv3_1" condDensity="0.317363 S_per_cm2" erev="-85.0 mV" segmentGroup="axonal" ion="k"/>
                <channelDensity id="axonal_g_pas" ionChannel="pas" condDensity="9.4e-05 S_per_cm2" erev="-60.216510 mV" segmentGroup="axonal" ion="non_specific"/>
                <channelDensity id="axonal_gImbar_Im" ionChannel="Im" condDensity="0.000999 S_per_cm2" erev="-85.0 mV" segmentGroup="axonal" ion="k"/>
                <channelDensity id="somatic_gK_Tstbar_K_Tst" ionChannel="K_Tst" condDensity="0.092965 S_per_cm2" erev="-85.0 mV" segmentGroup="somatic" ion="k"/>
                <channelDensity id="somatic_gkbar_StochKv" ionChannel="StochKv_deterministic" condDensity="3.6795e-05 S_per_cm2" erev="-85.0 mV" segmentGroup="somatic" ion="k"/>
                <channelDensity id="somatic_gNap_Et2bar_Nap_Et2" ionChannel="Nap_Et2" condDensity="1e-06 S_per_cm2" erev="50.0 mV" segmentGroup="somatic" ion="na"/>
                <channelDensity id="somatic_gSK_E2bar_SK_E2" ionChannel="SK_E2" condDensity="0.019726 S_per_cm2" erev="-85.0 mV" segmentGroup="somatic" ion="k"/>
                <channelDensity id="somatic_gK_Pstbar_K_Pst" ionChannel="K_Pst" condDensity="0.156376 S_per_cm2" erev="-85.0 mV" segmentGroup="somatic" ion="k"/>
                <channelDensity id="somatic_gSKv3_1bar_SKv3_1" ionChannel="SKv3_1" condDensity="0.297559 S_per_cm2" erev="-85.0 mV" segmentGroup="somatic" ion="k"/>
                <channelDensity id="somatic_g_pas" ionChannel="pas" condDensity="9.1e-05 S_per_cm2" erev="-62.442793 mV" segmentGroup="somatic" ion="non_specific"/>
                <channelDensity id="somatic_gImbar_Im" ionChannel="Im" condDensity="8e-06 S_per_cm2" erev="-85.0 mV" segmentGroup="somatic" ion="k"/>
                <channelDensity id="somatic_gNaTs2_tbar_NaTs2_t" ionChannel="NaTs2_t" condDensity="0.197999 S_per_cm2" erev="50.0 mV" segmentGroup="somatic" ion="na"/>
                <channelDensityNernst id="axonal_gCa_LVAstbar_Ca_LVAst" ionChannel="Ca_LVAst" condDensity="1.5e-05 S_per_cm2" segmentGroup="axonal" ion="ca"/>
                <channelDensityNernst id="axonal_gCabar_Ca" ionChannel="Ca" condDensity="3e-06 S_per_cm2" segmentGroup="axonal" ion="ca"/>
                <channelDensityNernst id="somatic_gCa_LVAstbar_Ca_LVAst" ionChannel="Ca_LVAst" condDensity="0.001067 S_per_cm2" segmentGroup="somatic" ion="ca"/>
                <channelDensityNernst id="somatic_gCabar_Ca" ionChannel="Ca" condDensity="3.2e-05 S_per_cm2" segmentGroup="somatic" ion="ca"/>
                <channelDensityNonUniform id="basal_gIhbar_Ih" ionChannel="Ih" erev="-45.0 mV" ion="hcn">
                    <variableParameter parameter="condDensity" segmentGroup="basal">
                        <inhomogeneousValue inhomogeneousParameter="PathLengthOver_basal" value="1e4 * ((-0.869600 + 2.087000*exp((p-0.000000)*0.003000))*0.000052)"/>
                    </variableParameter>
                </channelDensityNonUniform>
                <channelDensityNonUniform id="apical_gIhbar_Ih" ionChannel="Ih" erev="-45.0 mV" ion="hcn">
                    <variableParameter parameter="condDensity" segmentGroup="apical">
                        <inhomogeneousValue inhomogeneousParameter="PathLengthOver_apical" value="1e4 * ((-0.869600 + 2.087000*exp((p-0.000000)*0.003000))*0.000052)"/>
                    </variableParameter>
                </channelDensityNonUniform>
                <specificCapacitance value="1.0 uF_per_cm2" segmentGroup="basal"/>
                <specificCapacitance value="1.0 uF_per_cm2" segmentGroup="apical"/>
                <specificCapacitance value="1.0 uF_per_cm2" segmentGroup="axonal"/>
                <specificCapacitance value="1.0 uF_per_cm2" segmentGroup="somatic"/>
                <initMembPotential value="-80 mV"/>
            </membraneProperties>
            <intracellularProperties>
                <species segmentGroup="axonal" id="ca" concentrationModel="CaDynamics_E2_NML2__cSTUT_7_axonal" ion="ca" initialConcentration="5.0E-11 mol_per_cm3" initialExtConcentration="2.0E-6 mol_per_cm3"/>
                <species segmentGroup="somatic" id="ca" concentrationModel="CaDynamics_E2_NML2__cSTUT_7_somatic" ion="ca" initialConcentration="5.0E-11 mol_per_cm3" initialExtConcentration="2.0E-6 mol_per_cm3"/>
                <resistivity value="100 ohm_cm"/>
            </intracellularProperties>
        </biophysicalProperties>
    </cell>
</neuroml>
