<neuroml xmlns="http://www.neuroml.org/schema/neuroml2"  xmlns:xs="http://www.w3.org/2001/XMLSchema" xmlns:xsi="http://www.w3.org/2001/XMLSchema-instance" xsi:schemaLocation="http://www.neuroml.org/schema/neuroml2 https://raw.github.com/NeuroML/NeuroML2/development/Schemas/NeuroML2/NeuroML_v2beta4.xsd" id="bIR_1">
    <include href="../../NeuroML2/K_Tst.channel.nml"></include>
    <include href="../../NeuroML2/SKv3_1.channel.nml"></include>
    <include href="../../NeuroML2/StochKv_deterministic.channel.nml"></include>
    <include href="../../NeuroML2/Nap_Et2.channel.nml"></include>
    <include href="../../NeuroML2/NaTs2_t.channel.nml"></include>
    <include href="../../NeuroML2/Ih.channel.nml"></include>
    <include href="../../NeuroML2/pas.channel.nml"></include>
    <include href="../../NeuroML2/Im.channel.nml"></include>
    <include href="../../NeuroML2/NaTa_t.channel.nml"></include>
    <include href="../../NeuroML2/Ca_LVAst.channel.nml"></include>
    <include href="../../NeuroML2/SK_E2.channel.nml"></include>
    <include href="../../NeuroML2/K_Pst.channel.nml"></include>
    <include href="../../NeuroML2/Ca.channel.nml"></include>
    <cell id="bIR_1">
        <notes>
*************************
This is not a physiologically constrained cell model!!
It is only for testing formatting of the biophysicalProperties extracted from templates.json
*************************
</notes>
        <morphology id="morph">
            <segment id="0" name="soma">
                <proximal y="0.000000e+00" x="0.000000e+00" z="0.000000e+00" diameter="1.000000e+01"/>
                <distal y="2.000000e+01" x="0.000000e+00" z="0.000000e+00" diameter="1.000000e+01"/>
            </segment>
            <segment id="1" name="axon">
                <parent fractionAlong="0" segment="0"/>
                <proximal y="0.000000e+00" x="0.000000e+00" z="0.000000e+00" diameter="2.000000e+00"/>
                <distal y="-5.000000e+01" x="0.000000e+00" z="0.000000e+00" diameter="2.000000e+00"/>
            </segment>
            <segment id="2" name="basal_dend">
                <parent fractionAlong="1" segment="0"/>
                <proximal y="2.000000e+01" x="0.000000e+00" z="0.000000e+00" diameter="3.000000e+00"/>
                <distal y="2.000000e+01" x="5.000000e+01" z="0.000000e+00" diameter="3.000000e+00"/>
            </segment>
            <segment id="3" name="apical_dend1">
                <parent fractionAlong="1" segment="0"/>
                <proximal y="2.000000e+01" x="0.000000e+00" z="0.000000e+00" diameter="3.000000e+00"/>
                <distal y="1.200000e+02" x="0.000000e+00" z="0.000000e+00" diameter="3.000000e+00"/>
            </segment>
            <segment id="4" name="apical_dend2">
                <parent fractionAlong="1" segment="0"/>
                <proximal y="1.200000e+02" x="0.000000e+00" z="0.000000e+00" diameter="3.000000e+00"/>
                <distal y="2.200000e+02" x="0.000000e+00" z="0.000000e+00" diameter="3.000000e+00"/>
            </segment>
            <segmentGroup neuroLexId="sao864921383" id="soma">
                <member segment="0"/>
            </segmentGroup>
            <segmentGroup neuroLexId="sao864921383" id="axon">
                <member segment="1"/>
            </segmentGroup>
            <segmentGroup neuroLexId="sao864921383" id="basal_dend">
                <member segment="2"/>
            </segmentGroup>
            <segmentGroup neuroLexId="sao864921383" id="apical_dend">
                <member segment="3"/>
                <member segment="4"/>
            </segmentGroup>
            <segmentGroup id="somatic">
                <include segmentGroup="soma"/>
            </segmentGroup>
            <segmentGroup id="axonal">
                <include segmentGroup="axon"/>
            </segmentGroup>
            <segmentGroup id="basal">
                <include segmentGroup="basal_dend"/>
                <inhomogeneousParameter id="PathLengthOver_basal" variable="x" metric="Path Length from root">
                    <proximal translationStart="0.000000e+00"/>
                </inhomogeneousParameter>
            </segmentGroup>
            <segmentGroup id="apical">
                <include segmentGroup="apical_dend"/>
                <inhomogeneousParameter id="PathLengthOver_apical" variable="x" metric="Path Length from root">
                    <proximal translationStart="0.000000e+00"/>
                </inhomogeneousParameter>
            </segmentGroup>
        </morphology>
        <biophysicalProperties id="biophys">
            <membraneProperties>
                <channelDensity id="basal_gSKv3_1bar_SKv3_1" segmentGroup="basal" ion="k" ionChannel="SKv3_1" erev="-85.0 mV" condDensity="0.00545 S_per_cm2"/>
                <channelDensity id="basal_gkbar_StochKv" segmentGroup="basal" ion="k" ionChannel="StochKv_deterministic" erev="-85.0 mV" condDensity="2.90744e-05 S_per_cm2"/>
                <channelDensity id="basal_gNap_Et2bar_Nap_Et2" segmentGroup="basal" ion="na" ionChannel="Nap_Et2" erev="50.0 mV" condDensity="1e-06 S_per_cm2"/>
                <channelDensity id="basal_gNaTs2_tbar_NaTs2_t" segmentGroup="basal" ion="na" ionChannel="NaTs2_t" erev="50.0 mV" condDensity="0.004119 S_per_cm2"/>
                <channelDensity id="basal_g_pas" segmentGroup="basal" ion="non_specific" ionChannel="pas" erev="-60.065872 mV" condDensity="6e-06 S_per_cm2"/>
                <channelDensity id="apical_gSKv3_1bar_SKv3_1" segmentGroup="apical" ion="k" ionChannel="SKv3_1" erev="-85.0 mV" condDensity="0.00545 S_per_cm2"/>
                <channelDensity id="apical_gkbar_StochKv" segmentGroup="apical" ion="k" ionChannel="StochKv_deterministic" erev="-85.0 mV" condDensity="2.90744e-05 S_per_cm2"/>
                <channelDensity id="apical_gNap_Et2bar_Nap_Et2" segmentGroup="apical" ion="na" ionChannel="Nap_Et2" erev="50.0 mV" condDensity="1e-06 S_per_cm2"/>
                <channelDensity id="apical_gNaTs2_tbar_NaTs2_t" segmentGroup="apical" ion="na" ionChannel="NaTs2_t" erev="50.0 mV" condDensity="0.004119 S_per_cm2"/>
                <channelDensity id="apical_g_pas" segmentGroup="apical" ion="non_specific" ionChannel="pas" erev="-60.065872 mV" condDensity="6e-06 S_per_cm2"/>
                <channelDensity id="axonal_gNaTa_tbar_NaTa_t" segmentGroup="axonal" ion="na" ionChannel="NaTa_t" erev="50.0 mV" condDensity="3.418459 S_per_cm2"/>
                <channelDensity id="axonal_gK_Tstbar_K_Tst" segmentGroup="axonal" ion="k" ionChannel="K_Tst" erev="-85.0 mV" condDensity="0.026009 S_per_cm2"/>
                <channelDensity id="axonal_gNap_Et2bar_Nap_Et2" segmentGroup="axonal" ion="na" ionChannel="Nap_Et2" erev="50.0 mV" condDensity="1e-06 S_per_cm2"/>
                <channelDensity id="axonal_gSK_E2bar_SK_E2" segmentGroup="axonal" ion="k" ionChannel="SK_E2" erev="-85.0 mV" condDensity="9e-06 S_per_cm2"/>
                <channelDensity id="axonal_gK_Pstbar_K_Pst" segmentGroup="axonal" ion="k" ionChannel="K_Pst" erev="-85.0 mV" condDensity="0.025854 S_per_cm2"/>
                <channelDensity id="axonal_gSKv3_1bar_SKv3_1" segmentGroup="axonal" ion="k" ionChannel="SKv3_1" erev="-85.0 mV" condDensity="0.196957 S_per_cm2"/>
                <channelDensity id="axonal_g_pas" segmentGroup="axonal" ion="non_specific" ionChannel="pas" erev="-60.250899 mV" condDensity="2e-06 S_per_cm2"/>
                <channelDensity id="axonal_gImbar_Im" segmentGroup="axonal" ion="k" ionChannel="Im" erev="-85.0 mV" condDensity="0.000599 S_per_cm2"/>
                <channelDensity id="somatic_gK_Tstbar_K_Tst" segmentGroup="somatic" ion="k" ionChannel="K_Tst" erev="-85.0 mV" condDensity="0.008343 S_per_cm2"/>
                <channelDensity id="somatic_gkbar_StochKv" segmentGroup="somatic" ion="k" ionChannel="StochKv_deterministic" erev="-85.0 mV" condDensity="6.58298e-05 S_per_cm2"/>
                <channelDensity id="somatic_gNap_Et2bar_Nap_Et2" segmentGroup="somatic" ion="na" ionChannel="Nap_Et2" erev="50.0 mV" condDensity="1e-06 S_per_cm2"/>
                <channelDensity id="somatic_gSK_E2bar_SK_E2" segmentGroup="somatic" ion="k" ionChannel="SK_E2" erev="-85.0 mV" condDensity="0.0269 S_per_cm2"/>
                <channelDensity id="somatic_gK_Pstbar_K_Pst" segmentGroup="somatic" ion="k" ionChannel="K_Pst" erev="-85.0 mV" condDensity="0.502333 S_per_cm2"/>
                <channelDensity id="somatic_gSKv3_1bar_SKv3_1" segmentGroup="somatic" ion="k" ionChannel="SKv3_1" erev="-85.0 mV" condDensity="0.653374 S_per_cm2"/>
                <channelDensity id="somatic_g_pas" segmentGroup="somatic" ion="non_specific" ionChannel="pas" erev="-76.498119 mV" condDensity="5.7e-05 S_per_cm2"/>
                <channelDensity id="somatic_gImbar_Im" segmentGroup="somatic" ion="k" ionChannel="Im" erev="-85.0 mV" condDensity="0.000784 S_per_cm2"/>
                <channelDensity id="somatic_gNaTs2_tbar_NaTs2_t" segmentGroup="somatic" ion="na" ionChannel="NaTs2_t" erev="50.0 mV" condDensity="0.300054 S_per_cm2"/>
                <channelDensityNernst id="axonal_gCa_LVAstbar_Ca_LVAst" ionChannel="Ca_LVAst" condDensity="0.002256 S_per_cm2" segmentGroup="axonal" ion="ca"/>
                <channelDensityNernst id="axonal_gCabar_Ca" ionChannel="Ca" condDensity="0.000138 S_per_cm2" segmentGroup="axonal" ion="ca"/>
                <channelDensityNernst id="somatic_gCa_LVAstbar_Ca_LVAst" ionChannel="Ca_LVAst" condDensity="0.005574 S_per_cm2" segmentGroup="somatic" ion="ca"/>
                <channelDensityNernst id="somatic_gCabar_Ca" ionChannel="Ca" condDensity="0.000792 S_per_cm2" segmentGroup="somatic" ion="ca"/>
                <channelDensityNonUniform id="basal_gK_Tstbar_K_Tst" ionChannel="K_Tst" erev="-85.0 mV" ion="k">
                    <variableParameter segmentGroup="basal" parameter="condDensity">
                        <inhomogeneousValue value="1e4 * ((-0.869600 + 2.087000*exp((p--1000.000000)*-0.003000))*0.002940)" inhomogeneousParameter="PathLengthOver_basal"/>
                    </variableParameter>
                </channelDensityNonUniform>
                <channelDensityNonUniform id="basal_gIhbar_Ih" ionChannel="Ih" erev="-45.0 mV" ion="hcn">
                    <variableParameter segmentGroup="basal" parameter="condDensity">
                        <inhomogeneousValue value="1e4 * ((-0.869600 + 2.087000*exp((p-0.000000)*0.003000))*0.000051)" inhomogeneousParameter="PathLengthOver_basal"/>
                    </variableParameter>
                </channelDensityNonUniform>
                <channelDensityNonUniform id="basal_gImbar_Im" ionChannel="Im" erev="-85.0 mV" ion="k">
                    <variableParameter segmentGroup="basal" parameter="condDensity">
                        <inhomogeneousValue value="1e4 * ((-0.869600 + 2.087000*exp((p--1000.000000)*-0.003000))*0.000371)" inhomogeneousParameter="PathLengthOver_basal"/>
                    </variableParameter>
                </channelDensityNonUniform>
                <channelDensityNonUniform id="apical_gK_Tstbar_K_Tst" ionChannel="K_Tst" erev="-85.0 mV" ion="k">
                    <variableParameter segmentGroup="apical" parameter="condDensity">
                        <inhomogeneousValue value="1e4 * ((-0.869600 + 2.087000*exp((p--1000.000000)*-0.003000))*0.002940)" inhomogeneousParameter="PathLengthOver_apical"/>
                    </variableParameter>
                </channelDensityNonUniform>
                <channelDensityNonUniform id="apical_gIhbar_Ih" ionChannel="Ih" erev="-45.0 mV" ion="hcn">
                    <variableParameter segmentGroup="apical" parameter="condDensity">
                        <inhomogeneousValue value="1e4 * ((-0.869600 + 2.087000*exp((p-0.000000)*0.003000))*0.000051)" inhomogeneousParameter="PathLengthOver_apical"/>
                    </variableParameter>
                </channelDensityNonUniform>
                <channelDensityNonUniform id="apical_gImbar_Im" ionChannel="Im" erev="-85.0 mV" ion="k">
                    <variableParameter segmentGroup="apical" parameter="condDensity">
                        <inhomogeneousValue value="1e4 * ((-0.869600 + 2.087000*exp((p--1000.000000)*-0.003000))*0.000371)" inhomogeneousParameter="PathLengthOver_apical"/>
                    </variableParameter>
                </channelDensityNonUniform>
                <spikeThresh value="10mV"/>
                <specificCapacitance segmentGroup="basal" value="1.0 uF_per_cm2"/>
                <specificCapacitance segmentGroup="apical" value="1.0 uF_per_cm2"/>
                <specificCapacitance segmentGroup="axonal" value="1.0 uF_per_cm2"/>
                <specificCapacitance segmentGroup="somatic" value="1.0 uF_per_cm2"/>
                <initMembPotential segmentGroup="all" value="-80 mV"/>
            </membraneProperties>
            <intracellularProperties>
                <species segmentGroup="axonal" ion="ca" initialExtConcentration="2.0E-6 mol_per_cm3" concentrationModel="CaDynamics_E2_NML2__bIR_1_axonal" id="ca" initialConcentration="5.0E-11 mol_per_cm3"/>
                <species segmentGroup="somatic" ion="ca" initialExtConcentration="2.0E-6 mol_per_cm3" concentrationModel="CaDynamics_E2_NML2__bIR_1_somatic" id="ca" initialConcentration="5.0E-11 mol_per_cm3"/>
                <resistivity segmentGroup="all" value="100 ohm_cm"/>
            </intracellularProperties>
        </biophysicalProperties>
    </cell>
</neuroml>
