<Lems xmlns="http://www.neuroml.org/lems/0.7.2"
      xmlns:xsi="http://www.w3.org/2001/XMLSchema-instance"
      xsi:schemaLocation="http://www.neuroml.org/lems/0.7.2  https://raw.github.com/LEMS/LEMS/development/Schemas/LEMS/LEMS_v0.7.2.xsd">

    <Target component="sim1" reportFile="simulator.props" timesFile="time.dat"/>

        <!--Include standard NeuroML 2 ComponentType definitions-->

    <Include file="Cells.xml"/>
    <Include file="Networks.xml"/>
    <Include file="Simulation.xml"/>

        <!--Include the generated NeuroML 2 files-->

        <!--   Channel/synapse files-->
    <Include file="NMDAR.synapse.nml"/>
    <Include file="AMPAR.synapse.nml"/>
    <Include file="KConductance.channel.nml"/>
    <Include file="LeakConductance.channel.nml"/>
    <Include file="NaConductance.channel.nml"/>
        <!--   Cell files-->
    <Include file="TestCell_ChannelML.cell.nml"/>
        <!--   Network file-->

    <Include file="detAMPANMDASynapse.xml"/>

    <Include file="SimpleNet2.net.nml"/>

    <Component type="Simulation" id="sim1" length="100.0ms" step="0.01ms" target="SimpleNet">

        <Display id="GraphWin_0" title="Simple network" xmin="-10.0" xmax="110.0" ymin="-104.0" ymax="64.0" timeScale="1ms">
            <Line id="VOLTAGE-CG1_0" timeScale="1ms" quantity="CG1/0/TestCell_ChannelML/v" scale="1 mV" color="#000000"/>
            <Line id="VOLTAGE-CG2_0" timeScale="1ms" quantity="CG2/0/TestCell_ChannelML/v" scale="1 mV" color="#ff0000"/>
            <Line id="VOLTAGE-CG2_1" timeScale="1ms" quantity="CG2/1/TestCell_ChannelML/v" scale="1 mV" color="#ff8800"/>
            <Line id="VOLTAGE-CG2_2" timeScale="1ms" quantity="CG2/2/TestCell_ChannelML/v" scale="1 mV" color="#ff8866"/>
        </Display>

        <Display id="d2" title="Synaptic current" timeScale="1ms" xmin="-10.0" xmax="110.0" ymin="-0.0005" ymax="0.0045">
            <Line id ="CG2_0 iSyn (ratio_NMDA=0)" quantity="CG2/0/TestCell_ChannelML/iSyn" scale="1nA" color="#01DF01" timeScale="1ms"/>
            <Line id ="CG2_1 iSyn (ratio_NMDA=0.1)" quantity="CG2/1/TestCell_ChannelML/iSyn" scale="1nA" color="#015555" timeScale="1ms"/>
            <Line id ="CG2_2 iSyn (ratio_NMDA=0.2)" quantity="CG2/2/TestCell_ChannelML/iSyn" scale="1nA" color="#01DFee" timeScale="1ms"/>
        </Display>
     <!--
        <OutputFile id="Plot_0_OF" fileName="CG1_0.dat">
            <OutputColumn id="v" quantity="CG1/0/TestCell_ChannelML/v"/>
        </OutputFile>

        <OutputFile id="Plot_1_OF" fileName="CG2_0.dat">
            <OutputColumn id="v" quantity="CG2/0/TestCell_ChannelML/v"/>
        </OutputFile>

        <OutputFile id="Plot_1_1F" fileName="CG2_1.dat">
            <OutputColumn id="v" quantity="CG2/1/TestCell_ChannelML/v"/>
        </OutputFile>-->

    </Component>

</Lems>
